# -*- coding: utf-8 -*-
"""
SphereSweptIntersectionMethod – demonstration scene
====================================================

Beam 1 – COMPLETELY FIXED  (acts as a rigid obstacle along +X)
Beam 2 – PARALLEL to Beam 1, CLAMPED at its base, free tip falls under gravity.

Beam 2 starts GAP_Z mm directly above Beam 1.  Gravity bends it downward
until the SSIM component detects contact along their shared length.

Live data collection + 3D plots
---------------------------------
An SSIMPlotter controller records at every step:
  • simulation time  t
  • curvilinear parameter on Beam 1  s1*
  • curvilinear parameter on Beam 2  s2*
  • signed gap  δ  (< 0 ⇒ interpenetration)

At the end of the simulation it generates two 3D plots:
  (1)  δ  vs  (s1 , t)   saved as  delta_vs_s1_time.png
  (2)  δ  vs  (s2 , t)   saved as  delta_vs_s2_time.png

HOW TO STOP THE SIMULATION AND SAVE THE PLOTS
----------------------------------------------
  1. Press  [Q]  inside the runSofa viewer window.
  2. Press  [P]  to save plots without stopping.
  3. Let the simulation run until MAX_STEPS is reached.

Run with:
    runSofa scene_SSIM_TwoBeams.py
"""

import os
import time
import numpy as np
import matplotlib
matplotlib.use("Agg")          # non-interactive backend – safe inside runSofa
import matplotlib.pyplot as plt
from matplotlib import cm
import math
import Sofa
import Sofa.Core

import atexit
import os
import time

try:
    import openpyxl
    from openpyxl.styles import Font, PatternFill, Alignment
    _HAS_OPENPYXL = True
except ImportError:
    _HAS_OPENPYXL = False

SCENE_DIR = os.path.dirname(os.path.abspath(__file__))


# ──────────────────────────────────────────────────────────────────────────────
#  Scene parameters
# ──────────────────────────────────────────────────────────────────────────────
BEAM_LENGTH      = 120.0    # [mm]  total length of each beam
NB_SECTIONS      = 6        # number of Cosserat sections per beam
NB_FRAMES        = 100       # number of output Rigid3d frames per beam
RADIUS1_EX       = 6.0      # [mm]  cross-section radius
RADIUS1_IN       = 5.0      # [mm]  cross-section radius
RADIUS2_EX       = 2.0      # [mm]  cross-section radius
RADIUS2_IN       = 1.0      # [mm]  cross-section radius
YOUNG_MODULUS    = 3.0e6    # [Pa]
POISSON_RATIO    = 0.49
STIFFNESS        = 1.0e8    # base-clamp stiffness  (Beam 2 clamped end)
ALGORITHM        = "ALGO_1" # "ALGO_1" (segment-seg) or "ALGO_2" (node-seg NR)
DT               = 0.001     # [s]   time step
MAX_STEPS        = 500      # stop automatically after this many steps
MAX_K = NB_FRAMES
ALARM_DISTANCE = 3.0 * RADIUS2_EX

# ──────────────────────────────────────────────────────────────────────────────
#  Geometry
# ──────────────────────────────────────────────────────────────────────────────
#
#  Beam 1 – along global +X, centred at Y=0, Z=0  (fully fixed obstacle)
#    base at [0, 0, 0], quaternion [0,0,0,1]
#
#  Beam 2 – cantilever, clamped at base, free end falls under gravity (−Z).
#    base at [0, GAP_Y, GAP_Z].
#
#    GAP_Z > 0  : Beam 2 starts above Beam 1.
#    GAP_Y ≠ 0  : lateral eccentricity. Contact normal will lie in the (Y,Z)
#                 plane, tilted by atan2(GAP_Y, effective vertical gap at
#                 contact). GAP_Y = 0 reproduces the original axisymmetric
#                 (purely vertical) configuration.
#
# Initial vertical gap between the two parallel beam axes
GAP_Z = 0.0    # [mm]   must be > 2*RADIUS to start without interpenetration
GAP_Y = 0.0

def extract_contact_points(parent_node, contactMO, MAX_K):
    even_indices = list(range(0, 2 * MAX_K, 2))
    odd_indices  = list(range(1, 2 * MAX_K, 2))

    node_A = parent_node.addChild('Pc_A')
    contactMO_A = node_A.addObject(
        'MechanicalObject', template='Vec3d',
        name='contactMO_A',
        position=[[0., 0., 0.]] * MAX_K)
    node_A.addObject(
        'SubsetMapping', template='Vec3d,Vec3d',
        input=contactMO.getLinkPath(),
        output='@contactMO_A',
        indices=even_indices,
        handleTopologyChange=False)

    node_B = parent_node.addChild('Pc_B')
    contactMO_B = node_B.addObject(
        'MechanicalObject', template='Vec3d',
        name='contactMO_B',
        position=[[0., 0., 0.]] * MAX_K)
    node_B.addObject(
        'SubsetMapping', template='Vec3d,Vec3d',
        input=contactMO.getLinkPath(),
        output='@contactMO_B',
        indices=odd_indices,
        handleTopologyChange=False)

    return contactMO_A, contactMO_B
# ──────────────────────────────────────────────────────────────────────────────
#  Cosserat beam builder
# ──────────────────────────────────────────────────────────────────────────────

def _make_section_params(nb_sections, length):
    sec_len = length / nb_sections
    return (
        [[0., 0., 0.]] * nb_sections,
        [sec_len] * nb_sections,
        [i * sec_len for i in range(nb_sections + 1)],
    )


def _make_frame_params(nb_frames, length):
    fl       = length / nb_frames
    frames   = [[i * fl, 0., 0.,  0., 0., 0., 1.] for i in range(nb_frames + 1)]
    curv_abs = [i * fl for i in range(nb_frames + 1)]
    edge_indices = [[i, i + 1] for i in range(nb_frames)]
    return frames, curv_abs, edge_indices

def add_cosserat_beam(parent_node, name, base_pos, base_quat,
                      nb_sections, nb_frames, length, radius, radius_in,
                      young_modulus, poisson_ratio, stiffness,
                      beam_number,fully_fixed=False):
    """
    Build a Cosserat beam and attach it to *parent_node*.

    Parameters
    ----------
    fully_fixed : bool
        • False  (default) – beam is clamped at its base via a
          RestShapeSpringsForceField and carries a UniformMass so gravity
          acts on it (the tip is free to deform / fall).
        • True  – ALL degrees of freedom are frozen with
          FixedProjectiveConstraint on both the rigid-base MO and the
          cosserat-coordinate MO.  No mass is added.  The beam acts as a
          perfectly rigid, immovable obstacle.

    Returns
    -------
    frame_node : Sofa.Core.Node
        The child node that holds the mapped Rigid3d frames (FramesMO).
    """
    bx, by, bz     = base_pos
    qx, qy, qz, qw = base_quat

    sec_pos, sec_len, curv_in = _make_section_params(nb_sections, length)
    frames, curv_out, edge_indices = _make_frame_params(nb_frames, length)

    beam_node       = parent_node.addChild(name)
    solver_node = beam_node.addChild('solverNode')
    solver_node.addObject('EulerImplicitSolver',
                          rayleighStiffness=0.2, rayleighMass=0.1)
    solver_node.addObject('SparseLDLSolver', name='solver',
                          template='CompressedRowSparseMatrixd')
    #solver_node.addObject('BlockGaussSeidelConstraintSolver', tolerance=1e-5, maxIterations=5e2)
    solver_node.addObject('GenericConstraintCorrection', linearSolver = solver_node.solver.getLinkPath())

    rigid_base_node = solver_node.addChild('rigidBase')

    base_mo = rigid_base_node.addObject(
        'MechanicalObject', template='Rigid3d', name='RigidBaseMO',
        position=[bx, by, bz, qx, qy, qz, qw],
        showObject=True, showObjectScale=3.0)

    if fully_fixed:
        # ── Fix the rigid base completely ──────────────────────────────────
        rigid_base_node.addObject(
            'FixedProjectiveConstraint', name='fixBase',
            indices=[0])
    else:
        # ── Clamp the base with a stiff spring (allows small elastic reaction) ─
        rigid_base_node.addObject(
            'RestShapeSpringsForceField', name='clamp',
            stiffness=stiffness, angularStiffness=stiffness,
            external_points=0, points=0, template='Rigid3d')

    coord_node = solver_node.addChild('cosseratCoordinate')
    coord_mo   = coord_node.addObject(
        'MechanicalObject', template='Vec3d',
        name='cosserat_state', position=sec_pos)
    coord_node.addObject(
        'BeamHookeLawForceField',
        crossSectionShape='circular',
        length=sec_len, radius=radius,
        innerRadius = radius_in,
        youngModulus=young_modulus,
        poissonRatio=poisson_ratio)

    if fully_fixed:
        # ── Fix all cosserat strains (zero = straight reference config) ────
        all_section_ids = list(range(nb_sections))
        coord_node.addObject(
            'FixedProjectiveConstraint', name='fixStrains',
            indices=all_section_ids)

    frame_node = solver_node.addChild('mappedFrames')

    frames_mo = frame_node.addObject(
        'MechanicalObject', template='Rigid3d', name='FramesMO',
        position=frames, showObject=True, showObjectScale=2.0)

    if not fully_fixed:
        # Only the free beam needs mass; the fixed beam has none.
        frame_node.addObject('UniformMass', totalMass=0.1)

    frame_node.addObject(
        'DiscreteCosseratMapping', name='cosseratMapping',
        curv_abs_input=curv_in, curv_abs_output=curv_out,
        input1='@../cosseratCoordinate/cosserat_state',
        input2='@../rigidBase/RigidBaseMO',
        output='@FramesMO', debug=False)

    edges_positions = [[x, y, z] for x, y, z, *_ in frames]

    return frame_node, frames

def add_visual_model(framesNode, frames, rex, color=(0.85, 0.15, 0.15, 1.0)):
    """
    Build a tube-shaped visual model around the mapped Rigid3d frames of a
    Cosserat beam.

    Parameters
    ----------
    framesNode : Sofa.Core.Node
        The node holding the FramesMO (output Rigid3d frames of the beam).
    frames : list
        The list of frame positions+quaternions (used here only for its length).
    rex : float
        Outer radius of the cross-section [mm] – defines the tube radius.
    color : sequence of 4 floats, optional
        RGBA color of the tube surface, each component in [0, 1].
        Default is red (0.85, 0.15, 0.15, 1.0).
        Accepts any iterable of 4 floats (tuple, list, numpy array …).
    """
    N = len(frames)
    n_sides = 60
    TWO_PI = 2.0 * math.pi

    def _ring_positions(r):
        return [
            [0.0,
                r * math.cos(TWO_PI * k / n_sides),
             r * math.sin(TWO_PI * k / n_sides),
             ]
            for k in range(n_sides)
        ]

    def _tube_quads(n_frames, n_s):
        quads = []
        for i in range(n_frames - 1):
            for k in range(n_s):
                k1 = (k + 1) % n_s
                v0, v1 = i * n_s + k, i * n_s + k1
                v2, v3 = v0 + n_s, v1 + n_s
                quads.append([v0, v1, v2, v3])
        return quads

    rigid_idx = [i for i in range(N) for _ in range(n_sides)]
    quads = _tube_quads(N, n_sides)
    safe_name = "Tube"


    for r, color_list, suffix in [
        (rex, list(color), 'outer')
    ]:
        ring_pos = _ring_positions(r) * N
        color_str = " ".join(str(v) for v in color_list)

        vis = framesNode.addChild(f'visual_{suffix}_{safe_name}')

        # Topology (rest positions, connectivity)
        vis.addObject('MeshTopology', name='topo',
                      position=ring_pos, quads=quads)

        vis.addObject('MechanicalObject', name='visMO',
                      template='Vec3d', position=ring_pos)
        vis.addObject('RigidMapping',
                      input='@../FramesMO',
                      output='@visMO',
                      rigidIndexPerPoint=rigid_idx,
                      globalToLocalCoords=False)

        # OglModel in child node, driven by IdentityMapping from visMO
        ogl = vis.addChild('ogl')
        ogl.addObject('OglModel', name='oglModel',
                      src='@../topo',
                      color=color_str)
        ogl.addObject('IdentityMapping',
                      input='@../visMO',
                      output='@oglModel')


# ── Output directory (same folder as the scene file) ─────────────────────────
SCENE_DIR = os.path.dirname(os.path.abspath(__file__))


def createScene(root_node: Sofa.Core.Node):
    """
    Scene layout
    ============

    Beam 1 (fixed obstacle)
    -----------------------
    • Lies along the global +X axis at Z = 0.
    • Base at [0, 0, 0], no rotation.
    • ALL DOFs frozen with FixedProjectiveConstraint – it will never move.
    • No mass.

    Beam 2 (cantilever falling under gravity)
    -----------------------------------------
    • Lies along the global +X axis – PARALLEL to Beam 1.
    • Base clamped at [0, 0, GAP_Z] (directly above Beam 1's base), same
      orientation quaternion [0,0,0,1].
    • Clamped at its base by a RestShapeSpringsForceField.
    • Carries a UniformMass; gravity (−Z) bends it downward until it contacts
      Beam 1 along their shared length.
    """

    root_node.gravity = [0., 0., -9810.]   # mm/s² gravity
    root_node.dt      = DT

    root_node.addObject('RequiredPlugin', pluginName=[
        'Sofa.Component.Constraint.Projective',
        'Sofa.Component.LinearSolver.Direct',
        'Sofa.Component.Mass',
        'Sofa.Component.ODESolver.Backward',
        'Sofa.Component.SolidMechanics.Spring',
        'Sofa.Component.Visual',
        'Sofa.GL.Component.Rendering3D',
        'Cosserat',
        'Sofa.Component.StateContainer',
        'Sofa.Component.Setting',
        'Sofa.Component.Constraint.Lagrangian.Correction',
        'Sofa.Component.Mapping.Linear',
        'Sofa.Component.Mapping.NonLinear',
        'Sofa.Component.Topology.Container.Constant',
        "Sofa.Component.Collision.Detection.Intersection",
        "Sofa.Component.Collision.Response.Contact",
        "Sofa.Component.Constraint.Lagrangian.Correction",
        "Sofa.Component.Constraint.Lagrangian.Solver",
        "Sofa.GUI.Component", "Sofa.Component.Collision.Geometry", "Sofa.Component.LinearSolver.Direct",
        "Sofa.Component.Mapping.Linear", "Sofa.Component.MechanicalLoad",
        "Sofa.Component.StateContainer", "Sofa.Component.ODESolver.Backward",
        "Sofa.Component.AnimationLoop",
        "Sofa.Component.Collision.Detection.Algorithm",
        "Sofa.Component.Topology.Container.Dynamic",
        'Sofa.Component.Constraint.Lagrangian.Model'
    ])

    root_node.addObject('DefaultVisualManagerLoop')
    root_node.addObject('FreeMotionAnimationLoop')
    root_node.addObject('BackgroundSetting', color=[0.05, 0.05, 0.12, 1.0])

    # Camera positioned to see both beams from a 3/4-angle view
    root_node.addObject('Camera',
                        position=[-40, -80, 120],
                        lookAt=[50, 0, 0])

    root_node.addObject('VisualStyle',
                        displayFlags='showVisualModels showBehaviorModels '
                                     'showCollisionModels '
                                     'hideBoundingCollisionModels '
                                     'hideForceFields '
                                     'hideInteractionForceFields '
                                     'hideWireframe '
                                     'showMechanicalMappings')

    root_node.addObject('BlockGaussSeidelConstraintSolver',tolerance=1e-5, maxIterations=500)

    # ── Beam 1 – horizontal along +X, COMPLETELY FIXED ───────────────────────
    #
    #   Axis:  X ∈ [0, L]   Y = 0   Z = 0
    #   This beam never deforms or translates; it is a rigid obstacle.
    #
    beam1_framesNode, beam1_frames = add_cosserat_beam(
        root_node, 'Beam1_Fixed',
        base_pos   = [0., 0., 0.],
        base_quat  = [0., 0., 0., 1.],
        nb_sections = NB_SECTIONS,
        nb_frames   = NB_FRAMES,
        length      = BEAM_LENGTH,
        radius      = RADIUS1_EX,
        radius_in   = RADIUS1_IN,
        young_modulus  = YOUNG_MODULUS,
        poisson_ratio  = POISSON_RATIO,
        stiffness      = STIFFNESS,
        beam_number    = 1,
        fully_fixed    = True,
    )


    add_visual_model(beam1_framesNode, beam1_frames,
                     RADIUS1_IN, color=(0.55, 0.20, 0.75, 0.35))

    add_visual_model(beam1_framesNode, beam1_frames,
                     RADIUS1_EX, color=(0.55, 0.20, 0.75, 0.35))

    # ── Beam 2 – along +X (parallel to Beam 1), CLAMPED at base, free end falls ─
    #
    #   Same orientation as Beam 1 (quaternion [0,0,0,1]).
    #   Base at [0, 0, GAP_Z] so both beams share the same X axis range and
    #   Beam 2 starts GAP_Z mm directly above Beam 1.
    #
    #   Gravity acts in -Z: the free end bends downward until it contacts Beam 1.
    #   The base end (X = 0) is held by the RestShapeSpringsForceField clamp.
    #
    beam2_framesNode, beam2_frames = add_cosserat_beam(
        root_node, 'Beam2_Cantilever',
        base_pos   = [0., GAP_Y, GAP_Z],
        base_quat  = [0., 0., 0., 1.],
        nb_sections = NB_SECTIONS,
        nb_frames   = NB_FRAMES,
        length      = BEAM_LENGTH,
        radius      = RADIUS2_EX,
        radius_in   = RADIUS2_IN,
        young_modulus  = YOUNG_MODULUS,
        poisson_ratio  = POISSON_RATIO,
        stiffness      = STIFFNESS,
        beam_number    = 2,
        fully_fixed    = False,
    )
    add_visual_model(beam2_framesNode,beam2_frames,
                     RADIUS2_EX, color=(0.95, 0.85, 0.15, 1.0))
    add_visual_model(beam2_framesNode, beam2_frames,
                     RADIUS2_IN, color=(0.95, 0.85, 0.15, 1.0))

    intersection_node = root_node.addChild('IntersectionNode')

    beam1_MO = beam1_framesNode.FramesMO
    beam2_MO = beam2_framesNode.FramesMO

    ssim=intersection_node.addObject(
        'SphereSweptIntersectionMethod',
        name='ssim',
        beam1Frames=beam1_MO.getLinkPath() + '.position',
        beam2Frames=beam2_MO.getLinkPath() + '.position',
        beam1Velocities = beam1_MO.getLinkPath() + '.velocity',
        beam2Velocities=beam2_MO.getLinkPath() + '.velocity',
        radius1=RADIUS1_EX,
        radius2=RADIUS2_EX,
        innerRadius1 = RADIUS1_IN,
        innerRadius2 = RADIUS2_IN,
        algorithmType=ALGORITHM,
        contactConfiguration = "nested",
        defaultNormal = "0 0 -1",
    )

    contact_output = beam1_framesNode.addChild('contactOutput')
    beam2_framesNode.addChild(contact_output)

    contactMO = contact_output.addObject(
        'MechanicalObject', template='Vec3d',
        name='contactMO_gap',
        position=[[0., 0., 0.]] * 2*MAX_K)

    bcm = contact_output.addObject(
        'BeamContactMapping',
        name='bcm',
        input1=beam1_MO.getLinkPath(),
        input2=beam2_MO.getLinkPath(),
        output=contactMO.getLinkPath(),
        ssim = ssim.getLinkPath(),
        mappingMode='contactPoints'
    )

    contact_output.addObject(
        'ContactPointsUnilateralConstraint',
        name='cpuc',
        mu = 0.2,
        contactTriads = bcm.getLinkPath() + '.contactTriads',
        gapSign = bcm.getLinkPath() + '.gapSign',
        )
    return root_node
