# -*- coding: utf-8 -*-
"""
simulate_ctr_two_tubes.py
=========================
SOFA / Cosserat Plugin — Concentric Tube Robot (CTR) with two pre-curved tubes.

Tubes (all SI units)
--------------------
  Tube_1  (outer) : L=17 cm, R_crv=12 cm, arc=60 deg,    OD=3 mm,   ID=2.7 mm
  Tube_3  (inner) : L=33 cm, R_crv=6 cm,  arc=143.2 deg, OD=0.8 mm, ID=0.54 mm

INITIAL CONFIGURATION — CONCENTRIC PLACEMENT
---------------------------------------------
  The global frame sits at Tube_1's rigid base (world origin).
  Tube_1 takes its natural configuration freely from t=0 (no change).

  Tube_3 is the longer tube and is placed behind Tube_1 by X mm along -X so
  that no part of Tube_3 protrudes beyond Tube_1's tip at t=0.  This avoids
  the ill-posed question of what shape the protruding section should adopt.

  Offset derivation (both tubes straight along +X at t=0):
    Tube_1 base @ x=0,    tip @ x = +L1
    Tube_3 base @ x=-X,   tip @ x = -X + L3

  Tip-coincidence condition  ->  X = L3 - L1  (> 0 because L3 > L1)

  With the parameters below:
    X = 0.33 - 0.17 = 0.16 m = 160 mm
    Tube_3 rigid base at x = -0.16 m

  compute_concentric_offset() encodes this computation and is called once
  in createScene().  Only Tube_3 receives the offset; Tube_1 is untouched.

NODE TOPOLOGY (single-parent, mirrors PrecurvedTube exactly)
------------------------------------------------------------
  tube_node  (EulerImplicit + SparseLDL -- the solver scope)
    +-- <n>_rigid_base   (Rigid3d base DOF + proximal BC)
    +-- <n>_coss_state   (Vec3d strain DOFs + BeamHooke)
    +-- <n>_frames       (child of SolverNode ONLY -- single parent)
          +-- FramesMO   (Rigid3d output frames)
          +-- UniformMass
          +-- DiscreteCosseratMapping
                input1 = "@../<n>_coss_state/cosserat_state"
                input2 = "@../<n>_rigid_base/cosserat_base_mo"
          +-- <n>_visu
                +-- MeshTopology (ring_pos, quads -- rest shape)
                +-- visMO        (Vec3d -- mechanical target of RigidMapping)
                +-- RigidMapping (FramesMO -> visMO, rigidIndexPerPoint)
                +-- ogl
                      +-- OglModel       (src=../topo)
                      +-- IdentityMapping (visMO -> OglModel)

WHY SINGLE-PARENT?
  SOFA's VisualUpdateVisitor traverses a *tree*.  When frame_node has two
  parents (rigid_base AND coss_state), the visitor reaches it via rigid_base,
  processes its visual children, then arrives again via coss_state -- and skips
  it (already-visited flag).  The visual update never fires a second time, so
  OglModel positions freeze at t=0.  Making frame_node a child of SolverNode
  only (single parent) eliminates the double-visit and the visual chain updates
  every step, exactly as in PrecurvedTube.

WHY UncoupledConstraintCorrection (not GenericConstraintCorrection)?
  BeamHookeLawForceField acts on Vec3d strain DOFs and does NOT implement
  addKToMatrix().  SparseLDLSolver therefore assembles a degenerate stiffness
  matrix, causing GenericConstraintCorrection to silently produce wrong
  compliance values and corrupt the constraint solve.
  UncoupledConstraintCorrection uses a diagonal compliance approximation
  (L_avg / (E*I) per section) and bypasses the degenerate assembly entirely.

CUSTOM CONTACT PIPELINE (replaces classic SOFA collision pipeline entirely)
--------------------------------------------------------------------------
  The entire classic pipeline (CollisionPipeline, BruteForceBroadPhase,
  BVHNarrowPhase, LocalMinDistance, RuleBasedContactManager,
  LineCollisionModel, PointCollisionModel) is removed.  Contact is handled by:

    SphereSweptIntersectionMethod (SSIM)  [DataEngine]
      For CTR internal contact: radius1 = rin_1 (inner wall of Tube_1),
      radius2 = rex_3 (outer wall of Tube_3).
      gap = rin_1 - d_centreline - rex_3
         > 0  ->  clearance   (no contact)
         = 0  ->  touching
         < 0  ->  penetrating

      NOTE: SSIM must be configured for internal-contact mode so that it
      computes gap = r1 - d - r2 (not the external formula d - r1 - r2).
      The radius arguments passed here are the physically correct surfaces;
      the sign convention in SphereSweptIntersectionMethod.cpp must match.

    BeamContactMapping (BCM)  [Multi2Mapping<Rigid3d,Rigid3d,Vec3d>]
      mode = 'gap'  (single output MO, avoids SceneCheckMapping conflict).
      input1 = Tube_1/SolverNode/Tube_1_frames/FramesMO
      input2 = Tube_3/SolverNode/Tube_3_frames/FramesMO
      out[k] = delta[k] = Pc_B[k] - Pc_A[k]

    UnilateralLagrangianConstraint<Vec3d>  (ULC)
      object1 = contactMO_ref  (fixed zero, MAX_K DOFs)
      object2 = contactMO_gap  (BCM output)
      Violation: dfree = delta_n_free[k]; enforces delta_n >= 0.

    ContactFeeder  [BaseObject + AnimateBeginEvent]
      Reads SSIM distances -> clear() + addContact() on ULC each step.
      Activates pair k when distances[k][0] < ALARM_DISTANCE.

  Scene graph
  -----------
  root
  +-- FreeMotionAnimationLoop
  +-- BlockGaussSeidelConstraintSolver
  +-- Tube_1/
  |   +-- SolverNode/
  |       +-- EulerImplicitSolver + SparseLDLSolver + UncoupledConstraintCorrection
  |       +-- Tube_1_rigid_base/  cosserat_base_mo + PartialFixedProjectiveConstraint
  |       +-- Tube_1_coss_state/  cosserat_state + BeamHookeLawForceField
  |       +-- Tube_1_frames/      FramesMO + UniformMass + DiscreteCosseratMapping
  |           +-- Tube_1_visu/    MeshTopology + visMO + RigidMapping + ogl/
  +-- Tube_3/
  |   +-- SolverNode/
  |       +-- EulerImplicitSolver + SparseLDLSolver + UncoupledConstraintCorrection
  |       +-- Tube_3_rigid_base/  cosserat_base_mo + PartialFixedProjectiveConstraint
  |       +-- Tube_3_coss_state/  cosserat_state + BeamHookeLawForceField
  |       +-- Tube_3_frames/      FramesMO + UniformMass + DiscreteCosseratMapping
  |           +-- Tube_3_visu/    MeshTopology + visMO + RigidMapping + ogl/
  +-- contact_node/
      +-- SphereSweptIntersectionMethod  (ssim)
      +-- contactMO_ref  (Vec3d, MAX_K zero DOFs -- ULC object1 zero reference)
      +-- contactMO_gap  (Vec3d, K DOFs    -- BCM sole output, delta[k] = Pc_B-Pc_A)
      +-- BeamContactMapping  (bcm)  mappingMode='gap'
      +-- UnilateralLagrangianConstraint  (ulc)
      +-- ContactFeeder  (feeder)
"""

import math
import Sofa
import Sofa.Core

from init_monitoring import InitializationMonitor
from gui import CTRGuiBridge
from live_monitor   import LiveContactMonitor
# =============================================================================
#  TUBE PHYSICAL PARAMETERS
# =============================================================================

T1_PARAMS = {
    'name':          'Tube_1',
    'tube_number':   1,
    'str_length':    0.17,        # total arc length [m]
    'crv_radius':    0.12,        # curvature radius [m]
    'crv_angle_deg': 60.0,
    'rex':           15e-4,       # outer radius [m]
    'rin':           13.5e-4,     # inner (lumen) radius [m]
    'E':             6e10,
    'v':             0.33,
    'density':       6450,
    'nb_sections':   50,
    'nb_frames':     100,
    'color':         [0.75, 0.20, 0.75, 0.35],
}

T2_PARAMS = {
    'name':          'Tube_3',
    'tube_number':   3,
    'str_length':    0.33,        # total arc length [m]
    'crv_radius':    0.06,        # curvature radius [m]
    'crv_angle_deg': 143.239, #143.239
    'rex':           4e-4,        # outer radius [m]
    'rin':           2.7e-4,      # inner (lumen) radius [m]
    'E':             6e10,
    'v':             0.33,
    'density':       6450,
    'nb_sections':   50,
    'nb_frames':     100,
    'color':         [0.15, 0.50, 1.00, 1.0],
}

N_CIRCLE = 10   # points per cross-sectional ring for visual model
DEFAULT_NORMAL      = '0 1 0'

# =============================================================================
#  CONTACT PIPELINE PARAMETERS
# =============================================================================

# "ALGO_1": segment-to-segment closest pair (NB_SEC_1 x NB_SEC_3 pairs max)
# "ALGO_2": node-to-segment Newton-Raphson  ((NB_FRM_1+1) x NB_SEC_3 pairs max)
ALGORITHM = "ALGO_1"

# Pre-allocated size of contactMO_ref (zero-reference MO for ULC).
# Must be >= maximum number of contact pairs SSIM can ever produce.
# ALGO_1 upper bound: nb_sections_1 x nb_sections_3
# ALGO_2 upper bound: (nb_frames_1 + 1) x nb_sections_3
MAX_K = max(
    T1_PARAMS['nb_sections'] * T2_PARAMS['nb_sections'],          # ALGO_1: 10x20 = 200
    (T1_PARAMS['nb_frames'] + 1) * T2_PARAMS['nb_sections'],      # ALGO_2: 21x20 = 420
)   # -> 420

# CTR internal contact geometry:
#   The relevant surfaces are the inner wall of Tube_1 (radius = rin_1)
#   and the outer wall of Tube_3 (radius = rex_3).
#   Physical wall-to-wall clearance when coaxial:
#     gap_wall = rin_1 - rex_3 = 13.5e-4 - 4e-4 = 9.5e-4 m
#
# ContactFeeder activates a constraint for pair k when gap[k] < ALARM_DISTANCE.
# Setting ALARM_DISTANCE = gap_wall + margin catches near-contact before
# penetration: feeder activates as soon as any eccentricity consumes the gap.
_GAP_WALL      = T1_PARAMS['rin'] - T2_PARAMS['rex']   # 9.5e-4 m
ALARM_DISTANCE = T2_PARAMS['rex']                   # 1.0e-3 m  (0.5 mm margin)


# =============================================================================
#  GEOMETRY HELPERS
# =============================================================================

def compute_concentric_offset(p_outer, p_inner):
    """
    Compute the signed x-offset [m] to apply to the inner tube's rigid base
    so that the inner tube is fully housed inside the outer tube at t=0,
    with their tips coinciding along the X-axis.

    Geometry (both tubes straight along +X at t=0)
    -----------------------------------------------
      Outer (Tube_1):  base @ x = 0          tip @ x = +L_outer
      Inner (Tube_3):  base @ x = -X         tip @ x = -X + L_inner

      Tip-coincidence:  -X + L_inner = L_outer
                         X = L_inner - L_outer   (> 0 for a valid CTR)

    With the parameters in this file:
      L_outer = 0.17 m,  L_inner = 0.33 m
      X       = 0.16 m = 160 mm
      -> inner rigid base placed at x = -0.16 m

    Note: 'str_length' in the param dict is the TOTAL arc length
    (straight + curved), which is exactly what is needed here.

    Parameters
    ----------
    p_outer : dict   Param dict of the shorter (outer) tube -- T1_PARAMS.
    p_inner : dict   Param dict of the longer  (inner) tube -- T2_PARAMS.

    Returns
    -------
    float  Signed x-offset for the inner tube's rigid base [m].
           Always negative (inner base is behind outer base).

    Raises
    ------
    ValueError  If the inner tube is not strictly longer than the outer tube.
    """
    L_outer = p_outer['str_length']
    L_inner = p_inner['str_length']

    if L_inner <= L_outer:
        raise ValueError(
            f"Inner tube '{p_inner['name']}' (L = {L_inner * 1e3:.1f} mm) must be "
            f"strictly longer than outer tube '{p_outer['name']}' "
            f"(L = {L_outer * 1e3:.1f} mm) for a valid CTR concentric placement.  "
            f"Got X = {(L_inner - L_outer) * 1e3:.1f} mm <= 0."
        )

    X = L_inner - L_outer      # 0.16 m for this scene
    print(
        f"[CTR] Concentric offset: X = {X * 1e3:.1f} mm  "
        f"-- '{p_inner['name']}' rigid base at x = {-X * 1e3:.1f} mm  "
        f"(tips coincide at x = +{L_outer * 1e3:.1f} mm)"
    )
    return -X   # negative: inner base sits behind the outer base

def compute_tube_geometry(p, x_offset=0.0,
                         init_strategy='natural',   # MODIFIED  was: (no such kwarg)
                         outer_params=None):        # MODIFIED  was: (no such kwarg)
    """
    Build Cosserat discretization for a pre-curved tube.

    Layout: [BASE] --- straight (L_str) ---+--- curved arc (L_crv) --- [TIP]

    init_strategy
    -------------
      'straight'         : init_states = 0 everywhere (legacy behaviour --
                           tube starts perfectly straight, snaps to rest_states
                           on the first integration step).
      'natural'          : init_states = rest_states (tube starts in its
                           natural pre-curved shape, zero internal force).
      'conform_to_outer' : Inner-tube case for a CTR.  init_states are built
                           by arc-length-weighted averaging of the outer
                           tube's local curvature, so each inner section's
                           accumulated bending angle equals the outer tube's
                           accumulated bending angle over the same arc-length
                           range.  Requires outer_params and (typically) a
                           non-zero x_offset < 0.

    outer_params : dict or None
        Required when init_strategy == 'conform_to_outer'.  Param dict of
        the outer tube (e.g. T1_PARAMS).

    x_offset
    --------
    World-frame x-translation of the rigid base [m].  0.0 (default) for the
    outer tube; compute_concentric_offset(T1_PARAMS, T2_PARAMS) for the
    inner tube.

    Notes on x_offset
    ------------------
    sec_curv_abs and frm_curv_abs are intrinsic arc-length coordinates measured
    from the tube's own base.  They are consumed by DiscreteCosseratMapping and
    must always start at 0 -- they are NEVER offset.

    frame_positions (the world-frame Rigid3d initial positions fed to
    FramesMO) and the rigid base position in cosserat_base_mo are shifted by
    x_offset.  After the first DiscreteCosseratMapping::apply() call these
    positions are overwritten by the mapping; the offset ensures geometric
    consistency during SOFA's init() phase.
    """
    L     = p['str_length']
    R     = p['crv_radius']
    theta = math.radians(p['crv_angle_deg'])
    ns    = p['nb_sections']
    nf    = p['nb_frames']

    L_crv = R * theta
    L_str = max(0.0, L - L_crv)
    kappa = 1.0 / R

    if L_str < 1e-12:
        n_str, n_crv = 0, ns
    else:
        frac_str = L_str / L
        n_str    = max(1, round(frac_str * ns))
        n_crv    = max(1, ns - n_str)
        n_str    = ns - n_crv

    ls = L_str / n_str if n_str > 0 else 0.0
    lc = L_crv / n_crv

    section_lengths = [ls] * n_str + [lc] * n_crv
    rest_states     = [[0., 0., 0.]] * n_str + [[0., 0., kappa]] * n_crv

    # MODIFIED  init_states is now built per the chosen strategy.
    # was: init_states = [[0., 0., 0.]] * ns
    if init_strategy == 'straight':
        init_states = [[0., 0., 0.]] * ns

    elif init_strategy == 'natural':
        # Strain DOFs at t=0 already match the natural rest shape -> zero
        # BeamHooke force at t=0, the tube simply holds its pre-curvature.
        init_states = [list(s) for s in rest_states]

    elif init_strategy == 'conform_to_outer':
        if outer_params is None:
            raise ValueError(
                "init_strategy='conform_to_outer' requires outer_params "
                "(the param dict of the enclosing outer tube)."
            )

        # Outer-tube intrinsic geometry along its OWN arc-length.
        L_o     = outer_params['str_length']
        R_o     = outer_params['crv_radius']
        theta_o = math.radians(outer_params['crv_angle_deg'])
        L_crv_o = R_o * theta_o
        L_str_o = max(0.0, L_o - L_crv_o)
        kappa_o = 1.0 / R_o

        # x_offset is the inner tube's base position in the world (negative
        # for a CTR).  X = -x_offset > 0 is the inner tube's arc-length
        # coordinate at which it crosses the outer tube's base.
        # An inner-tube section at inner-arc-length s_in lies at
        #   outer-arc-length s_out = s_in - X
        # provided 0 <= s_out <= L_o.
        X = -x_offset

        def _outer_bend_angle(a, b):
            """
            Total bending angle accumulated by the outer tube between
            arc-lengths a and b, expressed in the outer tube's own arc
            coordinate.  Outside [0, L_o] -> 0.  Inside [0, L_str_o] -> 0.
            Inside [L_str_o, L_o] -> kappa_o * length.
            """
            a = max(0.0, min(L_o, a))
            b = max(0.0, min(L_o, b))
            if b <= L_str_o:
                return 0.0
            if a >= L_str_o:
                return kappa_o * (b - a)
            return kappa_o * (b - L_str_o)

        init_states = []
        s_run = 0.0
        for sl in section_lengths:
            s_in1 = s_run      - X     # inner section start in outer coords
            s_in2 = s_run + sl - X     # inner section end   in outer coords
            angle = _outer_bend_angle(s_in1, s_in2)
            avg_kappa = angle / sl     # constant strain that yields 'angle'
            init_states.append([0.0, 0.0, avg_kappa])
            s_run += sl
    else:
        raise ValueError(f"Unknown init_strategy: {init_strategy!r}")

    # Intrinsic arc-length coordinates -- NOT offset, always start at 0.
    sec_curv_abs = [0.0]
    s = 0.0
    for sl in section_lengths:
        s += sl
        sec_curv_abs.append(round(s, 10))

    lf           = L / nf
    frm_curv_abs = [round(i * lf, 10) for i in range(nf + 1)]

    # MODIFIED  Seed FramesMO with the curved configuration produced by
    # init_states (see integrate_frame_positions for the integration scheme).
    # When init_states is all zeros this reduces to the previous straight-
    # line placeholder, so 'straight' mode is unaffected.
    # was: frame_positions = [[x_offset + s, 0., 0., 0., 0., 0., 1.]
    #                         for s in frm_curv_abs]
    frame_positions = integrate_frame_positions(
        section_lengths, init_states, frm_curv_abs, x_offset
    )

    # One edge per consecutive frame pair: (0,1), (1,2), ..., (nf-1, nf)
    edge_indices = [[i, i + 1] for i in range(nf)]

    return (section_lengths, rest_states, init_states,
            sec_curv_abs, frame_positions, frm_curv_abs,
            edge_indices)

def tube_mass(p):
    ri, re = p['rin'], p['rex']
    return p['density'] * math.pi * (re**2 - ri**2) * p['str_length']


def build_tube_quads(n_frames, N):
    """Quad faces for a cylindrical surface (n_frames rings x N points)."""
    quads = []
    for i in range(n_frames - 1):
        for j in range(N):
            a = i * N + j
            b = i * N + (j + 1) % N
            c = (i + 1) * N + (j + 1) % N
            d = (i + 1) * N + j
            quads.append([a, b, c, d])
    return quads


def build_ring_positions(r, n_sides, n_frames):
    """
    Rest positions for the cylindrical surface: n_frames copies of a ring of
    n_sides points in the local YZ plane.  RigidMapping applies each frame's
    Rigid3d transform on top of these every timestep.
    """
    TWO_PI = 2.0 * math.pi
    ring = [[0.0,
             r * math.cos(TWO_PI * k / n_sides),
             r * math.sin(TWO_PI * k / n_sides)] for k in range(n_sides)]
    return ring * n_frames


def integrate_frame_positions(section_lengths, strains, frm_curv_abs,
                              x_offset=0.0):
    """
    Integrate piecewise-constant Cosserat strains along the arc-length to
    produce Rigid3d frame positions in WORLD coordinates, starting from
    rigid base (x_offset, 0, 0) with identity orientation.

    Strain convention follows the rest of the file: only the third
    component k_z is used (bending around the local Z axis -> planar curve
    in the world XY plane, since base orientation is identity and twist is
    zero).

    For a constant strain k_z over a section of length l:
      orientation rotates by (k_z * l) around Z
      local-frame translation:
          k_z != 0 :   ( sin(k_z*l)/k_z , (1 - cos(k_z*l))/k_z , 0 )
          k_z == 0 :   ( l ,             0 ,                    0 )

    The output's purpose is to seed FramesMO with a configuration that is
    geometrically consistent with init_states.  DiscreteCosseratMapping::
    apply() will produce the same values (modulo a small numerical
    difference) once it fires; until then, the visual chain renders
    these positions instead of a straight-line placeholder.
    """
    sec_ends = [0.0]
    for sl in section_lengths:
        sec_ends.append(sec_ends[-1] + sl)
    L_total = sec_ends[-1]

    frame_positions = []
    for s_target in frm_curv_abs:
        s_clip = min(s_target, L_total)

        x_w, y_w, z_w = x_offset, 0.0, 0.0
        theta = 0.0
        done = False

        for i, sl in enumerate(section_lengths):
            s_start = sec_ends[i]
            s_end   = sec_ends[i + 1]
            kappa   = strains[i][2]

            if s_clip <= s_end + 1e-12:
                ds = max(0.0, s_clip - s_start)
                if abs(kappa) < 1e-12:
                    dx_l, dy_l = ds, 0.0
                else:
                    dx_l = math.sin(kappa * ds) / kappa
                    dy_l = (1.0 - math.cos(kappa * ds)) / kappa

                ct, st = math.cos(theta), math.sin(theta)
                x_w += ct * dx_l - st * dy_l
                y_w += st * dx_l + ct * dy_l
                theta_at = theta + kappa * ds

                qz = math.sin(theta_at * 0.5)
                qw = math.cos(theta_at * 0.5)
                frame_positions.append([x_w, y_w, z_w, 0.0, 0.0, qz, qw])
                done = True
                break

            # Full section -- accumulate to its end and continue.
            if abs(kappa) < 1e-12:
                dx_l, dy_l = sl, 0.0
            else:
                dx_l = math.sin(kappa * sl) / kappa
                dy_l = (1.0 - math.cos(kappa * sl)) / kappa

            ct, st = math.cos(theta), math.sin(theta)
            x_w += ct * dx_l - st * dy_l
            y_w += st * dx_l + ct * dy_l
            theta += kappa * sl

        if not done:
            # s_target slightly past L_total due to rounding -> use tip frame.
            qz = math.sin(theta * 0.5)
            qw = math.cos(theta * 0.5)
            frame_positions.append([x_w, y_w, z_w, 0.0, 0.0, qz, qw])

    return frame_positions

# =============================================================================
#  TUBE VISUAL MODEL  (cylindrical surface, configurable color)         # modified
# =============================================================================

def build_hollow_tube_surface(rex, rin, n_frames_total, n_circle):
    """
    Build the position list, quad list, and rigid-index list for a HOLLOW
    tube surface that draws BOTH the external (rex) and internal (rin)     # modified
    walls of the tube wall material.

    Layout per frame i (i = 0 .. n_frames_total - 1), with N = n_circle:

        positions[i*2N        : i*2N + N    ]  -> outer ring (radius rex)
        positions[i*2N + N    : i*2N + 2N   ]  -> inner ring (radius rin)

    Each ring lies in the local YZ plane at local x = 0:

        ring[k] = (0, r * cos(2*pi*k/N), r * sin(2*pi*k/N))

    RigidMapping then transforms each frame's 2N points by FramesMO[i]'s
    Rigid3d pose, so the rendered hollow shell tracks the Cosserat
    centreline and orientation exactly.

    Both ends of the tube are LEFT OPEN -- no annular end cap is generated.
    This matches the physical geometry of a real CTR tube section (a hollow
    cylinder open at both ends), and crucially it keeps the outer tube's
    distal opening unobstructed so the inner tube can be seen emerging
    from the lumen during simulation.

    Quad winding conventions
    ------------------------
    - Outer shell: vertices ordered so the front face has a radial-OUTWARD
      normal (visible when the camera is outside the tube).
    - Inner shell: winding REVERSED relative to the outer shell so the
      front face has a radial-INWARD normal (visible when looking into the
      lumen through an open end).

    With OglModel's default cullFace=0 (no backface culling), both faces
    of every quad are drawn; the winding only governs which side is
    treated as "front" for lighting.  No special OglModel data needs to
    be set -- the defaults render the hollow tube correctly.

    Parameters
    ----------
    rex, rin : float
        External and internal radii [m].  Must satisfy rex > rin > 0.
    n_frames_total : int
        Total number of rings along the tube (= nb_frames + 1).
    n_circle : int
        Number of circumferential points per ring.

    Returns
    -------
    positions : list[list[float]]
        2 * n_circle * n_frames_total points, in the layout described above.
    quads : list[list[int]]
        Outer-shell quads followed by inner-shell quads.  No cap quads.
    rigid_idx : list[int]
        Per-point rigid-frame index, length 2 * n_circle * n_frames_total.
    """
    if not (rex > rin > 0.0):
        raise ValueError(
            f"Hollow tube surface requires rex > rin > 0 "
            f"(got rex={rex}, rin={rin})."
        )

    N      = n_circle
    TWO_PI = 2.0 * math.pi

    # ---- Positions: per frame, outer ring then inner ring --------------------
    positions = []
    for _ in range(n_frames_total):
        for k in range(N):
            ang = TWO_PI * k / N
            positions.append([0.0,
                              rex * math.cos(ang),
                              rex * math.sin(ang)])
        for k in range(N):
            ang = TWO_PI * k / N
            positions.append([0.0,
                              rin * math.cos(ang),
                              rin * math.sin(ang)])

    # ---- Quads ---------------------------------------------------------------
    quads = []

    # Outer shell -- front face has radial-outward normal.
    # Frame i outer ring starts at index (i * 2N).
    for i in range(n_frames_total - 1):
        for j in range(N):
            a = i * 2 * N + j
            b = i * 2 * N + (j + 1) % N
            c = (i + 1) * 2 * N + (j + 1) % N
            d = (i + 1) * 2 * N + j
            quads.append([a, b, c, d])

    # Inner shell -- front face has radial-inward (lumen-facing) normal.
    # Winding is the reverse of the outer shell.  Frame i inner ring starts
    # at index (i * 2N + N).
    for i in range(n_frames_total - 1):
        for j in range(N):
            a = i * 2 * N + N + j
            b = i * 2 * N + N + (j + 1) % N
            c = (i + 1) * 2 * N + N + (j + 1) % N
            d = (i + 1) * 2 * N + N + j
            quads.append([a, d, c, b])

    # ---- Rigid index per point -----------------------------------------------
    # All 2N points of frame i (outer ring + inner ring) are rigidly bound
    # to FramesMO index i.  RigidMapping applies that frame's transform to
    # the entire pair of rings, so the inner and outer shells stay coaxial
    # along the deformed Cosserat centreline.
    rigid_idx = [f for f in range(n_frames_total) for _ in range(2 * N)]

    return positions, quads, rigid_idx


def add_tube_visual(frame_node, p, color=None, n_circle=N_CIRCLE):
    """
    Attach a HOLLOW cylindrical-surface visual model to a tube's frame node, # modified
    drawing both the external wall (radius rex) and the internal lumen wall
    (radius rin).

    The visual chain is:
        <name>_visu/
          MeshTopology  (positions, quads -- rest shape, two shells)
          MechanicalObject 'visMO'  (mechanical target of RigidMapping)
          RigidMapping  (FramesMO -> visMO, rigidIndexPerPoint)
          ogl/
            OglModel        (src=../topo, color=...)
            IdentityMapping (visMO -> OglModel)

    The MeshTopology stores the *rest* (un-deformed) hollow-tube surface
    geometry expressed in each frame's local coordinates -- see
    build_hollow_tube_surface() for the exact point layout and quad
    winding conventions.  RigidMapping applies each FramesMO Rigid3d
    transform on top of these every timestep, so the rendered tube wall
    tracks the Cosserat frames exactly, keeping the outer and inner
    surfaces concentric along the deformed centreline.

    Parameters
    ----------
    frame_node : Sofa.Core.Node
        The tube's '<name>_frames' node, i.e. the node containing FramesMO.
        This is the 4th return value of add_cosserat_tube().
    p : dict
        Tube parameter dictionary.  Provides:
            'name'      -- visual sub-node prefix
            'rex'       -- external (outer-wall) radius [m]                # modified
            'rin'       -- internal (lumen) radius      [m]                # modified
            'nb_frames' -- number of rings = nb_frames + 1
            'color'     -- fallback RGBA when the `color` arg is None
    color : list[float] | tuple[float] | str | None, optional
        RGBA color for the OglModel.  Accepted forms:
          - 4-element list/tuple, e.g. [0.15, 0.50, 1.00, 1.0]
          - whitespace-separated string, e.g. '0.15 0.50 1.0 1.0'
          - None (default): fall back to p['color'] from the param dict.
        The same color is applied to both the outer and inner shell, since
        OglModel uses a single uniform `color` per model.
    n_circle : int, optional
        Number of circumferential points per ring (default: N_CIRCLE).
        Both the outer and inner ring use this same count, which is
        required so the two shells share consistent topology.

    Returns
    -------
    visu_node : Sofa.Core.Node
        The newly created '<name>_visu' child node.

    Notes
    -----
    - The function adds ONLY a leaf visual sub-graph.  It does not modify
      any mechanical, force-field, mapping, or contact component, and is
      therefore safe to call after the rest of the tube hierarchy is built.
    - `frame_node` MUST already contain a Rigid3d MechanicalObject named
      'FramesMO' (created by add_cosserat_tube).  The RigidMapping references
      it via the relative path '@../FramesMO'.
    - The two ends of the tube are left open (no end caps); see
      build_hollow_tube_surface() docstring for the rationale.
    """
    name = p['name']
    re   = p['rex']
    ri   = p['rin']                   # modified  was: (rin not used; outer-only mesh)
    nf   = p['nb_frames']
    n_frames_total = nf + 1

    # ---- Resolve color -------------------------------------------------------
    # A `None` color falls back to the tube's default color from the param
    # dict; a list/tuple is converted to OglModel's expected
    # whitespace-separated string format; a string is passed through verbatim.
    if color is None:
        color = p['color']

    if isinstance(color, str):
        color_str = color
    else:
        color_str = " ".join(str(v) for v in color)

    # ---- Hollow-tube surface geometry ----------------------------------------
    # modified  was: ring_pos = build_ring_positions(re, n_circle, n_frames_total)
    #                rigid_idx = [f for f in range(n_frames_total)
    #                             for _ in range(n_circle)]
    #                quads     = build_tube_quads(n_frames_total, n_circle)
    # The new helper builds outer + inner shells (open ends, no caps) so
    # the rendered geometry matches the physical tube wall: rex outside,
    # rin inside, with the lumen visible through the open ends.
    positions, quads, rigid_idx = build_hollow_tube_surface(
        re, ri, n_frames_total, n_circle
    )

    # ---- Visual node ---------------------------------------------------------
    visu_node = frame_node.addChild(name + '_visu')
    visu_node.addObject('MeshTopology', name='topo',
                        position=positions, quads=quads)
    visu_node.addObject('MechanicalObject', name='visMO',
                        template='Vec3d', position=positions)
    visu_node.addObject('RigidMapping',
                        input='@../FramesMO',
                        output='@visMO',
                        rigidIndexPerPoint=rigid_idx,
                        globalToLocalCoords=False)

    ogl_node = visu_node.addChild('ogl')
    ogl_node.addObject('OglModel', name='oglModel',
                       src='@../topo', color=color_str)
    ogl_node.addObject('IdentityMapping',
                       input='@../visMO',
                       output='@oglModel')

    return visu_node


# =============================================================================
#  ADD ONE COSSERAT TUBE  (no classic collision model)
# =============================================================================

def add_cosserat_tube(root_node, p, x_offset=0.0,
                     init_strategy='natural',     # MODIFIED  was: (no such kwarg)
                     outer_params=None):
    """
    Build the full Cosserat beam hierarchy for one pre-curved tube.

    The classic CollisionNode (LineCollisionModel / PointCollisionModel /
    EdgeSetTopologyContainer) is NOT added here; contact is handled entirely
    by the SSIM custom pipeline in contact_node.

    Critical design: frame_node is a child of SolverNode ONLY (single parent).
    See module docstring for the rationale.

    Parameters
    ----------
    root_node : Sofa node  Scene root.
    p         : dict       Tube parameter dictionary.
    x_offset  : float      World-frame x-position of the rigid base [m].
                           0.0 (default) for Tube_1 -- no change.
                           Pass compute_concentric_offset(T1_PARAMS, T2_PARAMS)
                           for Tube_3 to place it concentrically behind Tube_1.

    Returns
    -------
    base_mo    : MechanicalObject<Rigid3d>   Rigid base DOF (for controller).
    coss_mo    : MechanicalObject<Vec3d>     Cosserat strain DOFs.
    tube_node  : Sofa.Core.Node              Top-level tube node.
    frame_node : Sofa.Core.Node              Node holding FramesMO -- passed to
                                             SSIM/BCM for contact wiring.
    """
    name = p['name']

    # edge_indices unused (no CollisionNode in this pipeline).
    (section_lengths, rest_states, init_states,
     sec_curv_abs, frame_positions, frm_curv_abs,
     _edge_indices) = compute_tube_geometry( p, x_offset,
                                            init_strategy=init_strategy,
                                            outer_params=outer_params)

    re, ri = p['rex'], p['rin']
    nf     = p['nb_frames']
    mass   = tube_mass(p)

    # ---- Per-section compliance for UncoupledConstraintCorrection -----------
    # BeamHookeLawForceField does NOT implement addKToMatrix(), so
    # GenericConstraintCorrection cannot assemble a valid compliance matrix.
    # UncoupledConstraintCorrection with an explicit diagonal compliance value
    # bypasses the degenerate SparseLDLSolver assembly entirely.
    I_sec      = math.pi / 4.0 * (re ** 4 - ri ** 4)   # second moment of area [m^4]
    L_avg      = sum(section_lengths) / len(section_lengths)
    compliance = L_avg / (p['E'] * I_sec)               # [1 / (Pa * m^3)]

    # ---- Solver scope --------------------------------------------------------
    tube_node   = root_node.addChild(name)
    solver_node = tube_node.addChild('SolverNode')
    odesolver = solver_node.addObject('EulerImplicitSolver',
                          name='odesolver',
                          rayleighStiffness=0.2,
                          rayleighMass=0.1,
                          firstOrder=False)
    solver_node.addObject('SparseLDLSolver',
                          name='Solver',
                          template='CompressedRowSparseMatrixd')

    solver_node.addObject('GenericConstraintCorrection')

    # ---- Rigid base ----------------------------------------------------------
    rigid_base = solver_node.addChild(name + '_rigid_base')
    base_mo = rigid_base.addObject(
        'MechanicalObject',
        template='Rigid3d',
        name='cosserat_base_mo',
        # x_offset applied so Tube_3's kinematic root starts at x = -160 mm.
        # Tube_1 receives x_offset = 0.0 -> position unchanged.
        position=[[x_offset, 0., 0., 0., 0., 0., 1.]],
        showObject=True,
        showObjectScale=0.001,
    )
    # Allow translation along X (insertion) and rotation around X (axial twist).
    # Fix Y/Z translation and Y/Z rotation.
    rigid_base.addObject('PartialFixedProjectiveConstraint',
                         name='proximal_bc',
                         fixedDirections=[0, 1, 1, 0, 1, 1],
                         indices=[0])

    # ---- Cosserat strain state -----------------------------------------------
    coss_state = solver_node.addChild(name + '_coss_state')
    coss_mo = coss_state.addObject(
        'MechanicalObject',
        template='Vec3d',
        name='cosserat_state',
        position=init_states,
        rest_position=rest_states,
    )
    coss_state.addObject(
        'BeamHookeLawForceField',
        name='beam_force',
        crossSectionShape='circular',
        length=section_lengths,
        radius=re,
        innerRadius=ri,
        youngModulus=p['E'],
        poissonRatio=p['v'],
        template='Vec3d',
    )

    # ---- Output frames -- SINGLE parent (SolverNode) ------------------------
    # Do NOT addChild from rigid_base or coss_state here.
    # DiscreteCosseratMapping reaches both inputs via relative sibling paths.
    frame_node = solver_node.addChild(name + '_frames')

    frame_node.addObject(
        'MechanicalObject',
        template='Rigid3d',
        name='FramesMO',
        # frame_positions already carry x_offset (set in compute_tube_geometry).
        position=frame_positions,
        showObject=True,
        showObjectScale=0.001,
    )
    frame_node.addObject('UniformMass', name='mass', totalMass=mass)
    frame_node.addObject(
        'DiscreteCosseratMapping',
        name='cosseratMapping',
        # curv_abs_input / curv_abs_output are intrinsic arc lengths measured
        # from the tube's own base -- they are NEVER offset.
        curv_abs_input=sec_curv_abs,
        curv_abs_output=frm_curv_abs,
        input1='@../' + name + '_coss_state/cosserat_state',
        input2='@../' + name + '_rigid_base/cosserat_base_mo',
        output='@FramesMO',
        debug=False,
        radius=re,
    )

    # ---- Visual model --------------------------------------------------------
    # modified: visual setup extracted to add_tube_visual(frame_node, p, color)
    # was: inline MeshTopology + visMO + RigidMapping + OglModel + IdentityMapping
    # The visual chain is now built explicitly in createScene() so the caller
    # has direct control over the rendering color (and can choose to skip
    # visualization entirely, e.g. for headless benchmarking runs).

    # frame_node returned so createScene can wire FramesMO into SSIM/BCM
    # AND attach the visual sub-graph via add_tube_visual().
    return base_mo, coss_mo, tube_node, frame_node, odesolver


# =============================================================================
#  CONTROLLER
# =============================================================================

class CTRController(Sofa.Core.Controller):
    """
    GUI-driven actuation for the two-tube CTR.  The class is now a thin
    layer between ctr_gui.CTRGuiBridge (a Tkinter window in a daemon
    thread) and the rigid bases of the two Cosserat tubes.

    Phase semantics (read every step from gui_bridge.snapshot()):

      'waiting'      : Pre-Initialize state.  root_node.animate is False
                       so this hook is not even firing.  The bases sit at
                       their initial positions because nothing moves them.

      'initializing' : Initialize button has been clicked; animate has
                       been flipped to True by the GUI thread.  Inner tube
                       relaxes from conform-to-outer toward equilibrium.
                       This controller does NO actuation in this phase --
                       it only re-pins the rigid bases at their initial
                       positions every step (cumulative state stays zero).

      'control'      : InitializationMonitor has fired; bridge.phase has
                       transitioned to 'control'.

                       Translation slider value is the absolute base
                       displacement TARGET in [m]; the actual base
                       position chases the target by at most
                       translation_step_m metres PER SIMULATION STEP.
                       This per-step cap (not a per-second-sim-time speed)
                       is the right unit because the user perceives motion
                       in real time, and real-time speed is roughly
                       step_size * sim_steps_per_real_second -- the latter
                       being approximately dt-independent for a non-
                       adaptive solver.  translation_step_m is read live
                       from the GUI snapshot every step.

                       Rotation knob value is the angular increment in
                       [deg PER SIMULATION STEP] (NOT deg/sec sim time);
                       the cumulative angle integrates as
                            angle += radians(knob_value)
                       every step.  Per-step is the dt-independent unit
                       the user feels in real time.

                       dt requests are RAMPED toward the user's target,
                       not jumped to it (an instant 10x dt jump destroys
                       the constraint solve when contacts are active --
                       see DT_RAMP_PER_STEP).

    Why rate-limit translation but not rotation?
      Translation slider value is a TARGET (absolute set-point).  Without
      a rate limiter, dragging the slider 4 cm in one mouse motion would
      step-jump the rigid base by 4 cm in a single dt -- a kinetic shock
      the constraint solver cannot absorb.
      Rotation knob value is already a per-step rate; per-step increment
      is bounded by the GUI's Scale widget at
      |knob_value| <= max_rotation_rate_deg_per_step.

    Sign conventions
    ----------------
      Translation: +X is forward.  Both tubes' base x-positions are
        x_base = x0 + tx, where x0 is the initial offset (0 for Tube_1,
        t2_x_offset = -0.16 m for Tube_3) and tx is the cumulative
        displacement from initial (always >= 0 since the GUI sliders
        range from 0 to their respective maxima).
      Rotation: angles are about +X with the standard right-hand rule.
        The "+ : CW" interpretation in the GUI is a viewing convention;
        viewed from +X looking toward -X, positive angle appears as CW
        rotation of the cross-section.  If your camera convention says
        otherwise, flip the sign in _set_pose() rather than throughout.
    """

    # Per-step ramp factor for dt changes.  When the user requests a new
    # dt via the GUI Spinbox + Apply, the controller does NOT jump straight
    # to it -- that 10x cliff is what was crashing the constraint solver
    # with "tubes spasm out of control".  Instead, the actual root_node.dt
    # moves toward the target by a factor of DT_RAMP_PER_STEP per step
    # (capped at the target).  At 1.02 (2 %/step), a 10x change takes
    # ~120 steps; at 1.05 (5 %/step), ~47 steps.  The constraint solver
    # then sees a smooth dt trajectory and stays in convergence.
    DT_RAMP_PER_STEP = 1.02

    def __init__(self,
                 root_node,
                 t1_base_mo,
                 t2_base_mo,
                 t2_x_offset,
                 gui_bridge,
                 *args, **kwargs):
        super().__init__(*args, **kwargs)
        self.root_node  = root_node
        self.t1_base_mo = t1_base_mo
        self.t2_base_mo = t2_base_mo
        self.t2_x0      = float(t2_x_offset)
        self.gui        = gui_bridge

        # Cumulative pose, tracked across steps and never reset.  The
        # rigid base is rewritten every step from these values.
        self._t1_pos_m     = 0.0
        self._t2_pos_m     = 0.0
        self._t1_angle_rad = 0.0
        self._t2_angle_rad = 0.0

        # ---- dt ramp state ----
        # _dt_target is the most recent value the user requested via Apply.
        # _dt_current is the actual root_node.dt being applied THIS step;
        # ramped toward _dt_target gradually.  Both initialized from the
        # current root_node.dt so the first 'control' step doesn't see a
        # spurious change.
        try:
            dt0 = float(self.root_node.dt.value)
        except Exception:
            dt0 = 1e-4
        self._dt_current = dt0
        self._dt_target  = dt0

        self._step = 0

    # ------------------------------------------------------------------
    def onAnimateBeginEvent(self, event):
        self._step += 1
        snap  = self.gui.snapshot()
        phase = snap['phase']

        if phase == 'control':
            # 1) Latch the user's most recent dt target (if any).
            dt_req = self.gui.consume_dt_request()
            if dt_req is not None:
                self._dt_target = float(dt_req)
                print(f"[CTRController] dt target -> {self._dt_target:.6g} s "
                      f"at step {self._step}; ramping from "
                      f"{self._dt_current:.6g} s "
                      f"at <= {(self.DT_RAMP_PER_STEP - 1) * 100:.1f}% per step")

            # 2) Ramp _dt_current toward _dt_target by at most DT_RAMP_PER_STEP.
            #    Multiplicative (not additive) ramp gives constant relative
            #    rate, so a 10x change always takes the same number of steps
            #    regardless of the absolute scale.
            if abs(self._dt_current - self._dt_target) > 1e-15:
                ratio = self._dt_target / self._dt_current
                if ratio > self.DT_RAMP_PER_STEP:
                    self._dt_current *= self.DT_RAMP_PER_STEP
                elif ratio < 1.0 / self.DT_RAMP_PER_STEP:
                    self._dt_current /= self.DT_RAMP_PER_STEP
                else:
                    # Within one ramp step of the target -- snap.
                    self._dt_current = self._dt_target
                try:
                    self.root_node.dt = self._dt_current
                except Exception as e:
                    print(f"[CTRController] failed to write dt: {e!r}")

            dt = self._dt_current

            # 3) Translation: rate-limit toward the slider target.
            #    Per-step cap (in meters) read live from the GUI Spinbox.
            #    Per-step (NOT per-second) is the right unit here -- see the
            #    comment on shared['translation_step_m'] in ctr_gui.py for
            #    the rationale.
            max_step = float(snap['translation_step_m'])
            self._t1_pos_m = self._step_toward(
                self._t1_pos_m, snap['t1_translation_target_m'], max_step)
            self._t2_pos_m = self._step_toward(
                self._t2_pos_m, snap['t2_translation_target_m'], max_step)

            # 4) Rotation: integrate the angular-rate-per-step knob.
            #    [MODIFIED] Knob value is now in deg/STEP (not deg/sec sim).
            #    deg/sec sim was multiplied by dt to get deg/step, which at
            #    dt = 1e-4 made the maximum slider produce only ~3.6 deg per
            #    real second of sim -- visually indistinguishable from "no
            #    rotation".  Per-step is the dt-independent unit the user
            #    actually feels in real time, the same logic as translation_step_m.
            self._t1_angle_rad += math.radians(snap['t1_rotation_rate_deg_per_step'])
            self._t2_angle_rad += math.radians(snap['t2_rotation_rate_deg_per_step'])

        # 'initializing' (and 'waiting' if we ever get here) -> hold cumulative
        # state where it is.  The pose is written every step regardless to
        # keep the rigid bases pinned at the initial offset.  This mirrors the
        # previous controller's behaviour: rigid bases stay clamped while the
        # strain DOFs of the inner tube relax from conform-to-outer.
        self._set_pose(self.t1_base_mo, self._t1_pos_m, self._t1_angle_rad,
                       x0=0.0)
        self._set_pose(self.t2_base_mo, self._t2_pos_m, self._t2_angle_rad,
                       x0=self.t2_x0)

    # ------------------------------------------------------------------
    @staticmethod
    def _step_toward(current, target, max_step):
        """Move `current` toward `target` by at most `max_step`."""
        delta = target - current
        if delta >  max_step: return current + max_step
        if delta < -max_step: return current - max_step
        return target

    @staticmethod
    def _set_pose(mo, tx, angle_rad, x0=0.0):
        """
        Write the rigid base pose:
          x_world      = x0 + tx
          rotation     = angle_rad around +X
          y, z, ωy, ωz = 0   (already enforced by PartialFixedProjective-
                              Constraint, but written here for clarity)
        """
        half = angle_rad * 0.5
        s, c = math.sin(half), math.cos(half)
        with mo.position.writeable() as pos:
            p = list(pos[0])
            p[0] = x0 + tx
            p[1] = 0.0
            p[2] = 0.0
            p[3] = s
            p[4] = 0.0
            p[5] = 0.0
            p[6] = c
            pos[0] = p


# =============================================================================
#  CREATE SCENE
# =============================================================================

def createScene(root_node):

    # ---- Required plugins ---------------------------------------------------
    # Classic collision pipeline plugins (CollisionDetection.Algorithm,
    # CollisionDetection.Intersection, Collision.Response.Contact,
    # Collision.Geometry, Topology.Container.Dynamic, MultiThreading)
    # are removed -- they are fully replaced by the SSIM custom pipeline.
    root_node.addObject('RequiredPlugin', pluginName=[
        'Cosserat',                                           # DiscreteCosseratMapping, BeamHookeLawForceField,
                                                              # SphereSweptIntersectionMethod,
                                                              # BeamContactMapping, ContactFeeder
        'Sofa.Component.AnimationLoop',                       # FreeMotionAnimationLoop
        'Sofa.Component.Constraint.Lagrangian.Correction',   # UncoupledConstraintCorrection
        'Sofa.Component.Constraint.Lagrangian.Model',        # UnilateralLagrangianConstraint
        'Sofa.Component.Constraint.Lagrangian.Solver',       # BlockGaussSeidelConstraintSolver
        'Sofa.Component.Constraint.Projective',              # PartialFixedProjectiveConstraint
        'Sofa.Component.LinearSolver.Direct',                # SparseLDLSolver
        'Sofa.Component.Mapping.Linear',                     # IdentityMapping
        'Sofa.Component.Mapping.NonLinear',                  # RigidMapping
        'Sofa.Component.Mass',                               # UniformMass
        'Sofa.Component.ODESolver.Backward',                 # EulerImplicitSolver
        'Sofa.Component.Setting',                            # BackgroundSetting
        'Sofa.Component.StateContainer',                     # MechanicalObject
        'Sofa.Component.Topology.Container.Constant',        # MeshTopology
        'Sofa.Component.Visual',                             # VisualStyle
        'Sofa.GL.Component.Rendering3D',                     # OglModel
        'Sofa.GUI.Component',                                # Camera
    ])

    root_node.gravity = [0., 0., 0.]
    root_node.dt      = 1e-6

    root_node.addObject('DefaultVisualManagerLoop')
    root_node.addObject('FreeMotionAnimationLoop')
    root_node.addObject('BackgroundSetting', color=[1.0, 1.0, 1.0, 0])

    # BlockGaussSeidelConstraintSolver must sit at root so its VecIds are
    # visible to all MechanicalObjects during FreeMotionAnimationLoop's
    # global visitors.
    root_node.addObject('BlockGaussSeidelConstraintSolver',
                        name='ConstraintSolver',
                        tolerance=1e-5,
                        maxIterations=500)

    root_node.addObject('Camera',
                        position=[0.5, -0.3, 0.3],
                        lookAt=[0.08, 0.0, 0.0])

    root_node.addObject('VisualStyle',
                        displayFlags='showVisualModels hideBehaviorModels '
                                     'hideCollisionModels '
                                     'hideBoundingCollisionModels '
                                     'hideForceFields '
                                     'hideInteractionForceFields '
                                     'hideWireframe '
                                     'hideMechanicalMappings')

    # ---- Compute Tube_3's retraction offset ---------------------------------
    # X = L_inner - L_outer = 0.33 - 0.17 = 0.16 m = 160 mm
    # Tube_3's rigid base sits at x = -0.16 m so at t=0 (both tubes straight)
    # the tips coincide at x = +0.17 m.  Tube_1 is entirely unmodified.
    x_t3 = compute_concentric_offset(T1_PARAMS, T2_PARAMS)   # -> -0.16 m

    # ---- Build tubes --------------------------------------------------------
    # add_cosserat_tube now returns frame_node as the 4th value so we can
    # wire FramesMO into SSIM and BCM in the contact_node below.
    t1_base_mo, _, _, t1_frame_node, t1_solver = add_cosserat_tube(
        root_node, T1_PARAMS,
        init_strategy='natural',
    )

    t2_base_mo, _, _, t2_frame_node, t2_solver= add_cosserat_tube(
        root_node, T2_PARAMS,
        x_offset=x_t3,
        init_strategy='conform_to_outer',
        outer_params=T1_PARAMS,
    )

    # ---- Visual models ------------------------------------------------------
    # modified: visualization is now an explicit step in createScene().
    # Pass color=... to override the default 'color' field of the param dict;
    # pass color=None (or omit) to use that default.  Any of these forms work:
    #     color=[r, g, b, a]          -- list/tuple of 4 floats
    #     color='r g b a'             -- whitespace-separated string
    #     color=None                  -- fall back to p['color']
    #
    # Example overrides (uncomment to test):
    #     add_tube_visual(t1_frame_node, T1_PARAMS, color=[0.0, 0.7, 1.0, 1.0])
    #     add_tube_visual(t2_frame_node, T2_PARAMS, color='1.0 0.2 0.2 1.0')
    add_tube_visual(t1_frame_node, T1_PARAMS, color=T1_PARAMS['color'])  # outer
    add_tube_visual(t2_frame_node, T2_PARAMS, color=T2_PARAMS['color'])  # inner

    # ---- GUI bridge ---------------------------------------------------------
    # [MODIFIED] Construct the Tkinter GUI bridge BEFORE the controller and the
    # InitializationMonitor.  The bridge:
    #   - spawns its own daemon thread for tk.mainloop()
    #   - exposes snapshot() / consume_dt_request() / signal_init_complete()
    #   - holds a reference to root_node so the Initialize button can flip
    #     animate=True at click time
    # The controller stashes this object (self.gui = gui_bridge) so Python's
    # GC cannot collect it during the simulation.
    #
    # dt parameters:
    #   init_dt              -- the dt SOFA actually runs at during init.
    #                           MUST equal root_node.dt above (1e-4 here).
    #   default_control_dt   -- the value the dt Spinbox SUGGESTS once
    #                           control phase begins.  It is NOT auto-applied
    #                           (an earlier auto-bump version crashed the
    #                           solver -- see CTRGuiBridge.signal_init_complete
    #                           for the post-mortem).  The user types/edits
    #                           the value and clicks Apply to actually change
    #                           root_node.dt.
    gui_bridge = CTRGuiBridge(
        root_node=root_node,
        t1_max_translation_m=0.04,                  # outer tube slider: 0..4 cm
        t2_max_translation_m=0.08,                  # inner tube slider: 0..8 cm
        max_rotation_rate_deg_per_step=0.5,         # knob: -2..+2 deg/STEP
        init_dt=1e-4,                               # init phase dt (matches root_node.dt above)
        default_control_dt=1e-3,                    # GUI Spinbox suggested value (NOT auto-applied)
        dt_min=1e-6, dt_max=1e-1,                   # allowed range in the Spinbox
    )

    # ---- Controller (GUI-driven) --------------------------------------------
    # [MODIFIED] The controller no longer carries a hard-coded actuation
    # script.  All slider/knob values, dt requests and phase transitions
    # arrive via gui_bridge.snapshot() at the start of every step.
    # See CTRController docstring for the full phase state machine.
    root_node.addObject(CTRController(
        name='CTRController',
        root_node=root_node,
        t1_base_mo=t1_base_mo,
        t2_base_mo=t2_base_mo,
        t2_x_offset=x_t3,
        gui_bridge=gui_bridge,
    ))

    intersection_node = root_node.addChild('IntersectionNode')

    # ---- FramesMO handles ---------------------------------------------------
    # t{1,2}_frame_node is the '..._frames' node returned by add_cosserat_tube.
    # .FramesMO accesses the MechanicalObject<Rigid3d> inside it by name.
    t1_MO = t1_frame_node.FramesMO
    t2_MO = t2_frame_node.FramesMO


    ssim = intersection_node.addObject(
        'SphereSweptIntersectionMethod',
        name='ssim',
        beam1Frames=t1_MO.getLinkPath() + '.position',
        beam2Frames=t2_MO.getLinkPath() + '.position',
        beam1Velocities=t1_MO.getLinkPath() + '.velocity',
        beam2Velocities=t2_MO.getLinkPath() + '.velocity',
        radius1=T1_PARAMS['rex'],  # inner wall of Tube_1 [m]
        radius2=T2_PARAMS['rex'],
        innerRadius1=T1_PARAMS['rin'],
        innerRadius2=T2_PARAMS['rin'],
        algorithmType=ALGORITHM,
        contactConfiguration = "nested",
        defaultNormal = DEFAULT_NORMAL,
        broadPhaseMarginFactor = 1.5
    )

    contact_output = t1_frame_node.addChild('contactOutput')
    t2_frame_node.addChild(contact_output)

    contactMO = contact_output.addObject(
        'MechanicalObject', template='Vec3d',
        name='contactMO_gap',
        position=[[0., 0., 0.]] * 2 * MAX_K)

    bcm = contact_output.addObject(
        'BeamContactMapping',
        name='bcm',
        input1=t1_MO.getLinkPath(),
        input2=t2_MO.getLinkPath(),
        output=contactMO.getLinkPath(),
        ssim=ssim.getLinkPath(),
        mappingMode='contactPoints'
    )

    contact_output.addObject(
        'ContactPointsUnilateralConstraint',
        name='cpuc',
        mu=0,
        contactTriads=bcm.getLinkPath() + '.contactTriads',
        gapSign=bcm.getLinkPath() + '.gapSign',
    )

    # Reads bcm.distances and contactMO_gap.position once equilibrium is
    # detected, then pops up a one-shot 2D plot of normal gap vs curvilinear
    # abscissa of Pc_B along Tube_3.  See init_monitor.py for the class.
    #
    # Tube_3 frame curvilinear abscissae are read back from the
    # DiscreteCosseratMapping object that we just built (it stores the same
    # frm_curv_abs vector we passed at construction).  Reading from the
    # mapping object avoids modifying add_cosserat_tube's return signature.
    t2_curv_abs_frames = list(
        t2_frame_node.cosseratMapping.curv_abs_output.value
    )

    intersection_node.addObject(InitializationMonitor(
        name='InitMonitor',
        t1_MO=t1_MO,
        t2_MO=t2_MO,
        bcm=bcm,
        contact_mo=contactMO,
        t2_frame_curv_abs=t2_curv_abs_frames,
        # ---- Tunables (defaults shown; tune for your scene) ----
        # With dt = 1e-5 these correspond to:
        #   warmup = 5  ms ,  quiet = 1 ms , velocity threshold = 1 mm/s
        vel_threshold=10e-3,  # [m/s]
        quiet_steps=100,
        warmup_steps=500,
        log_every=200,  # 0 to silence the periodic v_max line
        auto_open=True,  # open the PNG in the OS image viewer when fired
        png_path=None,  # default: ./init_phase_gap_profile.png
        # [MODIFIED] When equilibrium is detected, the monitor calls this
        # callback BEFORE rendering its PNG plot.  signal_init_complete()
        # flips bridge.phase to 'control' and sets the init_complete flag
        # the GUI poll loop is waiting on; the dt is left untouched (an
        # earlier version auto-bumped it here and crashed the solver --
        # see CTRGuiBridge.signal_init_complete docstring for the full
        # post-mortem).  The user changes dt manually via the Spinbox.
        on_init_complete=gui_bridge.signal_init_complete,
    ))

    intersection_node.addObject(LiveContactMonitor(
        name='LiveMonitor',
        t2_MO=t2_MO,
        bcm=bcm,
        contact_mo=contactMO,
        t2_frame_curv_abs=t2_curv_abs_frames,
        bridge=gui_bridge,
        # At dt = 1e-5 s, every_n_steps=20 -> push every 0.2 ms sim time;
        # GUI repaints at 50 ms wall-clock cadence.  Tune up if you see
        # the SOFA loop spending visible time inside push_contact_profile;
        # tune down if the plot looks choppy.
        every_n_steps=20,
    ))
    # -------------------------------------------------------------------------

    # ---- Pause until the user clicks "Initialize" ---------------------------
    # [MODIFIED] The scene is fully built but the simulation does NOT step
    # until the user clicks the Initialize button on the Tk window, which
    # writes root_node.animate = True from the GUI thread.  This way the
    # inner tube sits visibly in its conform-to-outer initial state at t=0
    # rather than starting to relax immediately on scene load.
    #
    # If runSofa is configured to auto-play scenes (or the user clicks Play
    # in the runSofa toolbar before clicking Initialize), the relaxation
    # will start anyway.  The phase machine in CTRController/InitMonitor is
    # robust to that case: pressing Initialize after the fact merely marks
    # the phase transition; the eventual transition to 'control' still
    # happens when equilibrium is detected.
    root_node.animate = False

    return root_node
