import math
import Sofa
import Sofa.Core

# was: from comparison_between_ulc_and_cpuc.init_monitoring import InitializationMonitor
# (InitializationMonitor is replaced by RelaxationSpringController defined below.)
from gui2 import CTRGuiBridgeStraightOuter
from comparison_between_ulc_and_cpuc.live_monitor   import LiveContactMonitor
# =============================================================================
#  TUBE PHYSICAL PARAMETERS
# =============================================================================

T1_PARAMS = {
    'name':          'Outer_Tube',
    'tube_number':   1,
    'rex':           6e-3, # 6 mm
    'rin':           5e-3,  #5 mm
    'E':             6e10,
    'v':             0.33,
    'density':       6450,
    'nb_sections':   50,
    'nb_frames':     100,
    'color':         [0.75, 0.20, 0.75, 0.35],
}

T2_PARAMS = {
    'name':          'Arc',
    'tube_number':   2,
    'crv_radius':    30e-3,        # 3 cm
    'rex':           1.5e-3,        # outer radius [m]
    'rin':           8e-4,      # inner (lumen) radius [m]
    'E':             6e10,
    'v':             0.33,
    'density':       6450,
    'nb_sections':   50,
    'nb_frames':     100,
    'color':         [0.15, 0.50, 1.00, 1.0],
}

N_CIRCLE = 10   # points per cross-sectional ring for visual model
DEFAULT_NORMAL      = '0 -1 0'

# =============================================================================
#  CONTACT PIPELINE PARAMETERS
# =============================================================================

# "ALGO_1": segment-to-segment closest pair (NB_SEC_1 x NB_SEC_3 pairs max)
# "ALGO_2": node-to-segment Newton-Raphson  ((NB_FRM_1+1) x NB_SEC_3 pairs max)
ALGORITHM = "ALGO_1"

# Pre-allocated size of contactMO_ref (zero-reference MO for ULC).
# Must be >= maximum number of contact pairs SSIM can ever produce.
# ALGO_1 upper bound: nb_sections_1 x nb_sections_3
# ALGO_2 upper bound: (nb_frames_1 + 1) x nb_sections_3
MAX_K = max(
    T1_PARAMS['nb_sections'] * T2_PARAMS['nb_sections'],          # ALGO_1: 10x20 = 200
    (T1_PARAMS['nb_frames'] + 1) * T2_PARAMS['nb_sections'],      # ALGO_2: 21x20 = 420
)   # -> 420


_GAP_WALL      = T1_PARAMS['rin'] - T2_PARAMS['rex']
ALARM_DISTANCE = T2_PARAMS['rex']

# =============================================================================
#  RELAXATION SPRING PARAMETERS (initialization phase)
# =============================================================================
# Per-frame translational and angular stiffness applied to the inner tube's
# FramesMO via RestShapeSpringsForceField. The springs anchor each frame to
# its initial (straight) pose, so at t=0 the rod is held in the construction
# configuration in spite of the rest-strain mismatch from BeamHookeLawForceFF.
# A controller smoothly ramps both stiffnesses to zero over RELAX_RAMP_STEPS,
# at which point the system is purely under beam + contact forces and
# signal_init_complete() is fired to transition the GUI to 'control' phase.
# Tune these to your scene; values are starting points only.
RELAX_K_INITIAL_TRANS = 1.0e2   # N/m  per-frame translational spring stiffness
RELAX_K_INITIAL_ANG   = 1.0e1   # N*m/rad per-frame angular spring stiffness
RELAX_RAMP_STEPS      = 5000    # number of animate steps over which K_eff -> 0


# =============================================================================
#  GEOMETRY HELPERS
# =============================================================================
def build_tube_quads(n_frames, N):
    """Quad faces for a cylindrical surface (n_frames rings x N points)."""
    quads = []
    for i in range(n_frames - 1):
        for j in range(N):
            a = i * N + j
            b = i * N + (j + 1) % N
            c = (i + 1) * N + (j + 1) % N
            d = (i + 1) * N + j
            quads.append([a, b, c, d])
    return quads


def build_ring_positions(r, n_sides, n_frames):

    TWO_PI = 2.0 * math.pi
    ring = [[0.0,
             r * math.cos(TWO_PI * k / n_sides),
             r * math.sin(TWO_PI * k / n_sides)] for k in range(n_sides)]
    return ring * n_frames


def build_hollow_tube_surface(rex, rin, n_frames_total, n_circle):
    if not (rex > rin > 0.0):
        raise ValueError(
            f"Hollow tube surface requires rex > rin > 0 "
            f"(got rex={rex}, rin={rin})."
        )

    N      = n_circle
    TWO_PI = 2.0 * math.pi

    # ---- Positions: per frame, outer ring then inner ring --------------------
    positions = []
    for _ in range(n_frames_total):
        for k in range(N):
            ang = TWO_PI * k / N
            positions.append([0.0,
                              rex * math.cos(ang),
                              rex * math.sin(ang)])
        for k in range(N):
            ang = TWO_PI * k / N
            positions.append([0.0,
                              rin * math.cos(ang),
                              rin * math.sin(ang)])

    # ---- Quads ---------------------------------------------------------------
    quads = []

    # Outer shell -- front face has radial-outward normal.
    # Frame i outer ring starts at index (i * 2N).
    for i in range(n_frames_total - 1):
        for j in range(N):
            a = i * 2 * N + j
            b = i * 2 * N + (j + 1) % N
            c = (i + 1) * 2 * N + (j + 1) % N
            d = (i + 1) * 2 * N + j
            quads.append([a, b, c, d])


    for i in range(n_frames_total - 1):
        for j in range(N):
            a = i * 2 * N + N + j
            b = i * 2 * N + N + (j + 1) % N
            c = (i + 1) * 2 * N + N + (j + 1) % N
            d = (i + 1) * 2 * N + N + j
            quads.append([a, d, c, b])

    rigid_idx = [f for f in range(n_frames_total) for _ in range(2 * N)]

    return positions, quads, rigid_idx


def add_tube_visual(frame_node, p, color=None, n_circle=N_CIRCLE):

    name = p['name']
    re   = p['rex']
    ri   = p['rin']
    nf   = p['nb_frames']
    n_frames_total = nf + 1

    # ---- Resolve color -------------------------------------------------------
    # A `None` color falls back to the tube's default color from the param
    # dict; a list/tuple is converted to OglModel's expected
    # whitespace-separated string format; a string is passed through verbatim.
    if color is None:
        color = p['color']

    if isinstance(color, str):
        color_str = color
    else:
        color_str = " ".join(str(v) for v in color)

    # ---- Hollow-tube surface geometry ----------------------------------------
    #                rigid_idx = [f for f in range(n_frames_total)
    #                             for _ in range(n_circle)]
    #                quads     = build_tube_quads(n_frames_total, n_circle)
    # The new helper builds outer + inner shells (open ends, no caps) so
    # the rendered geometry matches the physical tube wall: rex outside,
    # rin inside, with the lumen visible through the open ends.
    positions, quads, rigid_idx = build_hollow_tube_surface(
        re, ri, n_frames_total, n_circle
    )

    # ---- Visual node ---------------------------------------------------------
    visu_node = frame_node.addChild(name + '_visu')
    visu_node.addObject('MeshTopology', name='topo',
                        position=positions, quads=quads)
    visu_node.addObject('MechanicalObject', name='visMO',
                        template='Vec3d', position=positions)
    visu_node.addObject('RigidMapping',
                        input='@../FramesMO',
                        output='@visMO',
                        rigidIndexPerPoint=rigid_idx,
                        globalToLocalCoords=False)

    ogl_node = visu_node.addChild('ogl')
    ogl_node.addObject('OglModel', name='oglModel',
                       src='@../topo', color=color_str)
    ogl_node.addObject('IdentityMapping',
                       input='@../visMO',
                       output='@oglModel')

    return visu_node


def calculate_x_offset(outer_tube, arc):
    L_outer = outer_tube['length']
    L_arc = arc['crv_radius'] * arc['angle']
    return (L_outer - L_arc)/2


# =============================================================================
#  GEOMETRY HELPERS
# =============================================================================

def compute_length_of_outer_tube(outer_beam, arc):
    rin     = outer_beam['rin']
    rex_arc = arc['rex']
    r_crv   = arc['crv_radius']
    eps1    = 3e-3
    eps2    = 1e-3

    y0 = rin - rex_arc - r_crv - eps1

    radicand = r_crv * r_crv - (rin + y0) ** 2
    if radicand <= 0.0:
        raise ValueError(...)

    L1_max = 2.0 * math.sqrt(radicand)
    L1     = L1_max - 2.0 * eps2
    if L1 <= 0.0:
        raise ValueError(...)

    outer_beam['length'] = L1
    outer_beam['y0']     = y0


def compute_angle_arc(l_outer, r_crv, p, factor=1.5):
    """Arc total length L2 = factor * L1 and total subtended angle L2/r_crv."""
    L2          = factor * l_outer
    p['length'] = L2
    p['angle']  = L2 / r_crv


def tube_mass(p):
    """Hollow-cylinder mass = density * pi * (re^2 - ri^2) * length."""
    ri, re = p['rin'], p['rex']
    return p['density'] * math.pi * (re * re - ri * ri) * p['length']


# =============================================================================
#  COSSERAT TUBE GEOMETRY
# =============================================================================

def compute_tube_geometry(p, beam_type,
                          init_strategy='natural',
                          outer_params=None):
    """
    Build all geometry quantities consumed by add_cosserat_tube.

    Returns
    -------
    section_lengths : list[float]            len = nb_sections
    rest_states     : list[Vec3]             len = nb_sections
    init_states     : list[Vec3]             len = nb_sections
    sec_curv_abs    : list[float]            len = nb_sections + 1   (intrinsic, [0, L])
    frame_positions : list[Rigid3d]          len = nb_frames + 1     (WORLD coords)
    frm_curv_abs    : list[float]            len = nb_frames + 1     (intrinsic, [0, L])
    edge_indices    : list[[int,int]]        len = nb_frames

    Conventions
    -----------
    - Strain Vec3 is [k_torsion, k_y, k_z] in the BODY frame (BeamHookeLaw,
      Vec3d template). Pure planar bending in the local x-y plane uses k_z.
    - frame_positions[0] equals the rigid-base pose by construction; the
      caller writes that into the rigid_base MO.
    - 'straight': base at (-L/2, 0, 0), identity quat. Frames evenly spaced
      along world +X.
    - 'arc'    : base at the LEFT endpoint of an arc that lies on the
      circle x^2 + (y - y0)^2 = r_crv^2 (in the z=0 plane), symmetric
      about the world Y axis. Body +x at base points along the arc toward
      s = L. Requires outer_params['y0'] (set by compute_length_of_outer_tube).

    init_strategy
    -------------
      'natural'  : init_states == rest_states (system starts at rest)
      'straight' : init_states == 0 regardless of rest (system relaxes
                   from a straight initial shape toward rest_states)
    """
    if beam_type == 'straight':
        return _geometry_straight(p, init_strategy)
    elif beam_type == 'arc':
        return _geometry_arc(p, init_strategy, outer_params)
    else:
        raise ValueError(
            f"compute_tube_geometry: unknown beam_type={beam_type!r}; "
            f"expected 'straight' or 'arc'."
        )


def _geometry_straight(p, init_strategy):
    L      = p['length']
    nb_sec = p['nb_sections']
    nb_frm = p['nb_frames']      # number of frame intervals; nb_frm+1 frames

    # ---- Sections --------------------------------------------------------
    ls              = L / nb_sec
    section_lengths = [ls] * nb_sec
    sec_curv_abs    = [i * ls for i in range(nb_sec + 1)]
    sec_curv_abs[-1] = L                                  # snap the endpoint

    # ---- Strain (rest = init = 0) ---------------------------------------
    rest_states = [[0.0, 0.0, 0.0] for _ in range(nb_sec)]
    if init_strategy in ('natural', 'straight'):
        init_states = [[0.0, 0.0, 0.0] for _ in range(nb_sec)]
    else:
        raise ValueError(
            f"_geometry_straight: unsupported init_strategy={init_strategy!r}"
        )

    # ---- Frames ---------------------------------------------------------
    lf            = L / nb_frm
    frm_curv_abs  = [i * lf for i in range(nb_frm + 1)]
    frm_curv_abs[-1] = L

    x_base = -0.5 * L
    frame_positions = [
        [x_base + s, 0.0, 0.0, 0.0, 0.0, 0.0, 1.0]
        for s in frm_curv_abs
    ]

    edge_indices = [[i, i + 1] for i in range(nb_frm)]

    return (section_lengths, rest_states, init_states,
            sec_curv_abs, frame_positions, frm_curv_abs,
            edge_indices)


def _geometry_arc(p, init_strategy, outer_params):
    L      = p['length']
    r_crv  = p['crv_radius']
    nb_sec = p['nb_sections']
    nb_frm = p['nb_frames']

    if init_strategy not in ('natural', 'straight'):
        raise ValueError(
            f"_geometry_arc: unsupported init_strategy={init_strategy!r}"
        )

    # ---- Sections (intrinsic) -------------------------------------------
    ls               = L / nb_sec
    section_lengths  = [ls] * nb_sec
    sec_curv_abs     = [i * ls for i in range(nb_sec + 1)]
    sec_curv_abs[-1] = L

    # ---- Rest strain (intrinsic; same for both init strategies) --------
    kappa_z     = -1.0 / r_crv
    rest_states = [[0.0, 0.0, kappa_z] for _ in range(nb_sec)]

    # ---- Frame curvilinear abscissas (intrinsic) ------------------------
    lf               = L / nb_frm
    frm_curv_abs     = [i * lf for i in range(nb_frm + 1)]
    frm_curv_abs[-1] = L

    if init_strategy == 'natural':
        # Base at LEFT endpoint of the symmetric arc on the (0,y0)-centred
        # circle.  Rod starts in its natural curved shape (init = rest).
        if outer_params is None or 'y0' not in outer_params:
            raise ValueError(
                "_geometry_arc: 'natural' requires outer_params['y0'] "
                "(set by compute_length_of_outer_tube)."
            )
        y0       = outer_params['y0']
        phi_half = 0.5 * (L / r_crv)

        x_base    = -r_crv * math.sin(phi_half)
        y_base    =  y0 + r_crv * math.cos(phi_half)
        beta      =  phi_half
        qz_b      = math.sin(0.5 * beta)
        qw_b      = math.cos(0.5 * beta)
        base_pose = [x_base, y_base, 0.0, 0.0, 0.0, qz_b, qw_b]

        init_states = [list(v) for v in rest_states]

        cb, sb          = math.cos(beta), math.sin(beta)
        frame_positions = []
        for s in frm_curv_abs:
            phi     = s / r_crv
            x_body  =  r_crv * math.sin(phi)
            y_body  = -r_crv * (1.0 - math.cos(phi))
            wx      = x_base + cb * x_body - sb * y_body
            wy      = y_base + sb * x_body + cb * y_body
            theta_w = beta - phi
            fqz     = math.sin(0.5 * theta_w)
            fqw     = math.cos(0.5 * theta_w)
            frame_positions.append([wx, wy, 0.0, 0.0, 0.0, fqz, fqw])

    else:
        base_pose   = [-0.5 * L, 0.0, 0.0, 0.0, 0.0, 0.0, 1.0]
        init_states = [[0.0, 0.0, 0.0] for _ in range(nb_sec)]

        frame_positions = [
            [-0.5 * L + s, 0.0, 0.0, 0.0, 0.0, 0.0, 1.0]
            for s in frm_curv_abs
        ]

    assert frame_positions[0] == base_pose, (
        "_geometry_arc: frame_positions[0] != base_pose -- code bug."
    )

    edge_indices = [[i, i + 1] for i in range(nb_frm)]

    return (section_lengths, rest_states, init_states,
            sec_curv_abs, frame_positions, frm_curv_abs,
            edge_indices)

# =============================================================================
#  COSSERAT TUBE: SCENE-GRAPH BUILDER
# =============================================================================

def add_cosserat_tube(root_node, p, beam_type,
                      init_strategy='natural',
                      outer_params=None,
                      fixed_directions=None,
                      relaxation_spring_stiffness=None,
                      relaxation_spring_angular=None):
    """
    Build a Cosserat tube under root_node.

    Scene graph:
        root_node/<name>                              (tube_node)
          SolverNode/                                 (solver_node)
            EulerImplicitSolver, SparseLDLSolver,
            GenericConstraintCorrection
            <name>_rigid_base/                        (rigid_base)
              MechanicalObject<Rigid3d>  (1 dof)      <- base_pose from geometry
              PartialFixedProjectiveConstraint        (free X-trans, X-rot)
            <name>_coss_state/                        (coss_state)
              MechanicalObject<Vec3d>    (nb_sec dofs)
              BeamHookeLawForceField                  (linear elastic, circular hollow)
            <name>_frames/                            (frame_node)
              MechanicalObject<Rigid3d>  (nb_frm+1 dofs)
              UniformMass
              DiscreteCosseratMapping  (input1=coss, input2=base, output=frames)

    Parameters
    ----------
    beam_type     : 'straight' or 'arc'
    init_strategy : 'natural' (init = rest) or 'straight' (init = zero)
    outer_params  : required for beam_type='arc' (provides 'y0').
    fixed_directions : list[int] of length 6, or None
                      If None (default), no PartialFixedProjectiveConstraint is added.
                      Otherwise, a list of 6 ints (1=fixed, 0=free) for [tx,ty,tz,rx,ry,rz].
    relaxation_spring_stiffness : float or None
                      Per-frame translational stiffness for a RestShapeSpringsForceField
                      attached to FramesMO. None disables the spring. Anchors
                      default to FramesMO.rest_position which equals the initial
                      mapped frame poses, so the spring holds the rod in its
                      construction shape at t=0.
    relaxation_spring_angular   : float or None
                      Per-frame angular stiffness companion to the above.

    Returns
    -------
    base_mo, coss_mo, tube_node, frame_node, odesolver, relax_spring_ff
    relax_spring_ff is None when no spring kwargs were provided.
    """
    name = p['name']

    (section_lengths, rest_states, init_states,
     sec_curv_abs, frame_positions, frm_curv_abs,
     _edge_indices) = compute_tube_geometry(
        p, beam_type,
        init_strategy=init_strategy,
        outer_params=outer_params,
    )

    # frame_positions[0] is the base pose in WORLD coords (set by the
    # geometry function for the chosen beam_type and init_strategy).
    base_pose = frame_positions[0]

    re, ri = p['rex'], p['rin']
    mass   = tube_mass(p)

    # ---- Solver scope ----------------------------------------------------
    tube_node   = root_node.addChild(name)
    solver_node = tube_node.addChild('SolverNode')

    odesolver = solver_node.addObject(
        'EulerImplicitSolver',
        name='odesolver',
        rayleighStiffness=0.2,
        rayleighMass=0.1,
        firstOrder=False,
    )
    solver_node.addObject(
        'SparseLDLSolver',
        name='Solver',
        template='CompressedRowSparseMatrixd',
    )
    solver_node.addObject('GenericConstraintCorrection')

    # ---- Rigid base ------------------------------------------------------
    rigid_base = solver_node.addChild(name + '_rigid_base')
    base_mo = rigid_base.addObject(
        'MechanicalObject',
        template='Rigid3d',
        name='cosserat_base_mo',
        position=[base_pose],
        showObject=True,
        showObjectScale=0.001,
    )
    # Free X-translation (insertion) and X-rotation (axial twist) only.
    if fixed_directions is not None:
        rigid_base.addObject(
            'PartialFixedProjectiveConstraint',
            name='proximal_bc',
            fixedDirections=list(fixed_directions),
            indices=[0],
        )

    # ---- Cosserat strain state ------------------------------------------
    coss_state = solver_node.addChild(name + '_coss_state')
    coss_mo = coss_state.addObject(
        'MechanicalObject',
        template='Vec3d',
        name='cosserat_state',
        position=init_states,
        rest_position=rest_states,
    )
    coss_state.addObject(
        'BeamHookeLawForceField',
        name='beam_force',
        crossSectionShape='circular',
        length=section_lengths,
        radius=re,
        innerRadius=ri,
        youngModulus=p['E'],
        poissonRatio=p['v'],
        template='Vec3d',
    )

    # ---- Output frames (single parent: SolverNode) ----------------------
    # DiscreteCosseratMapping reaches both inputs by relative sibling paths;
    # do NOT addChild this node from rigid_base or coss_state.
    frame_node = solver_node.addChild(name + '_frames')
    frame_node.addObject(
        'MechanicalObject',
        template='Rigid3d',
        name='FramesMO',
        position=frame_positions,
        showObject=True,
        showObjectScale=0.001,
    )
    frame_node.addObject('UniformMass', name='mass', totalMass=mass)
    frame_node.addObject(
        'DiscreteCosseratMapping',
        name='cosseratMapping',
        curv_abs_input=sec_curv_abs,
        curv_abs_output=frm_curv_abs,
        input1='@../' + name + '_coss_state/cosserat_state',
        input2='@../' + name + '_rigid_base/cosserat_base_mo',
        output='@FramesMO',
        debug=False,
        radius=re,
    )

    # ---- Optional relaxation springs on FramesMO (init mechanism) -------
    # RestShapeSpringsForceField attached to a mapped Rigid3d MO is a
    # standard SOFA pattern: spring forces back-propagate to the parent
    # rigid_base + coss_state through DiscreteCosseratMapping::applyJT.
    # rest_position defaults to FramesMO.position at construction, which is
    # the initial straight (or whatever init_strategy gives) configuration.
    relax_spring_ff = None
    if (relaxation_spring_stiffness is not None
            and relaxation_spring_angular is not None):
        nb_pts = len(frame_positions)
        relax_spring_ff = frame_node.addObject(
            'RestShapeSpringsForceField',
            name='RelaxSprings',
            points=list(range(nb_pts)),
            stiffness=[float(relaxation_spring_stiffness)] * nb_pts,
            angularStiffness=[float(relaxation_spring_angular)] * nb_pts,
            drawSpring=False,
        )

    return base_mo, coss_mo, tube_node, frame_node, odesolver, relax_spring_ff


# =============================================================================
#  CONTROLLER
# =============================================================================
class RelaxationSpringController(Sofa.Core.Controller):
    """
    Drives the relaxation-spring stiffness on the inner tube's FramesMO from
    its initial value to zero over RELAX_RAMP_STEPS animate steps, while the GUI
    is in the 'initializing' phase. When the ramp completes the controller calls
    gui_bridge.signal_init_complete(), which the GUI uses to transition to
    'control' phase.

    Phase behaviour
    --------------
      'waiting'      : stiffness held at its initial value (rod stays in init shape).
      'initializing' : smoothstep ramp 1 -> 0 applied multiplicatively to stiffness;
                       on completion -> signal_init_complete and stiffness pinned at 0.
      'control'      : stiffness held at 0 (springs effectively absent).

    The smoothstep s(t) = t^2 (3 - 2t) avoids the C^1 discontinuity of a linear
    ramp at both endpoints, removing transient force kicks.
    """

    def __init__(self,
                 spring_ff,
                 gui_bridge,
                 nb_points,
                 K_initial,
                 KA_initial,
                 ramp_steps,
                 *args, **kwargs):
        super().__init__(*args, **kwargs)
        self.spring_ff = spring_ff
        self.gui       = gui_bridge
        self.nb_points = int(nb_points)
        self.K0        = float(K_initial)
        self.KA0       = float(KA_initial)
        self.N_ramp    = max(1, int(ramp_steps))

        self._ramp_step = 0
        self._ramp_done = False

        # Construction-time stiffness already at K0 / KA0 (set in addObject).

    # ------------------------------------------------------------------
    def onAnimateBeginEvent(self, event):
        snap  = self.gui.snapshot()
        phase = snap['phase']

        if self._ramp_done:
            return

        if phase == 'initializing':
            self._ramp_step += 1
            t = min(self._ramp_step / float(self.N_ramp), 1.0)
            s = t * t * (3.0 - 2.0 * t)        # smoothstep
            scale = 1.0 - s                    # 1 -> 0
            self._set_stiffness(self.K0 * scale, self.KA0 * scale)

            if self._ramp_step >= self.N_ramp:
                self._set_stiffness(0.0, 0.0)
                self._ramp_done = True
                print(f"[RelaxationSpringController] ramp complete after "
                      f"{self.N_ramp} steps; signaling init complete.")
                try:
                    self.gui.signal_init_complete()
                except Exception as e:
                    print(f"[RelaxationSpringController] "
                          f"signal_init_complete failed: {e!r}")

        elif phase == 'control':
            # User forced 'control' before ramp finished; release immediately.
            self._set_stiffness(0.0, 0.0)
            self._ramp_done = True

        # 'waiting': hold initial stiffness, do nothing.

    # ------------------------------------------------------------------
    def _set_stiffness(self, K, KA):
        """Per-point overwrite of the stiffness and angularStiffness vectors."""
        K_vec  = [float(K)]  * self.nb_points
        KA_vec = [float(KA)] * self.nb_points
        # `.value = [...]` replaces the entire vector; SOFA reallocates as needed.
        self.spring_ff.stiffness.value        = K_vec
        self.spring_ff.angularStiffness.value = KA_vec


class CTRController(Sofa.Core.Controller):
    """
    See previous docstring -- behaviour is identical EXCEPT during the
    'waiting' / 'initializing' phases the controller does NOT touch the
    inner-tube base. Combined with fixed_directions=None on the inner
    tube, this lets the rigid base float freely so BOTH ends of the arc
    relax toward the rest curvature.

    On the transition initializing -> control, the controller captures
    wherever the inner base has landed and treats that pose as the new
    "rest" reference: with cumulative DOFs at 0, the first control-phase
    write yields exactly the captured pose, so there is no snap.
    """

    DT_RAMP_PER_STEP = 1.02

    def __init__(self,
                 root_node,
                 t1_base_mo,
                 t2_base_mo,
                 gui_bridge,
                 *args, **kwargs):
        super().__init__(*args, **kwargs)
        self.root_node  = root_node
        self.t1_base_mo = t1_base_mo
        self.t2_base_mo = t2_base_mo
        self.gui        = gui_bridge

        # Outer: pin to construction-time pose forever.
        self._t1_rest_pose = list(t1_base_mo.position.value[0])

        # Inner: filled on init->control transition (NOT at construction).
        self._t2_rest_pose = None

        self._t2_tx = 0.0
        self._t2_ty = 0.0
        self._t2_tz = 0.0
        self._t2_rx = 0.0
        self._t2_rz = 0.0

        try:
            dt0 = float(self.root_node.dt.value)
        except Exception:
            dt0 = 1e-4
        self._dt_current = dt0
        self._dt_target  = dt0

        self._step       = 0
        self._prev_phase = 'waiting'

    # ------------------------------------------------------------------
    def onAnimateBeginEvent(self, event):
        self._step += 1
        snap  = self.gui.snapshot()
        phase = snap['phase']

        # 1) Outer tube: pin every step regardless of phase.
        self._write_pose(self.t1_base_mo, self._t1_rest_pose)

        # 2) Detect init -> control transition and snapshot the inner base
        if self._prev_phase != 'control' and phase == 'control':
            self._t2_rest_pose = list(self.t2_base_mo.position.value[0])
            x, y, z, qx, qy, qz, qw = self._t2_rest_pose
            print(f"[CTRController] init -> control at step {self._step}; "
                  f"captured inner-tube base pose: "
                  f"pos=({x:+.4f}, {y:+.4f}, {z:+.4f}) "
                  f"quat=({qx:+.4f}, {qy:+.4f}, {qz:+.4f}, {qw:+.4f})")
        self._prev_phase = phase

        # 3) Control phase: dt ramp + DOF advancement + write inner base.
        if phase == 'control':
            dt_req = self.gui.consume_dt_request()
            if dt_req is not None:
                self._dt_target = float(dt_req)
                print(f"[CTRController] dt target -> {self._dt_target:.6g} s "
                      f"at step {self._step}; ramping from "
                      f"{self._dt_current:.6g} s "
                      f"at <= {(self.DT_RAMP_PER_STEP - 1) * 100:.1f}% per step")

            if abs(self._dt_current - self._dt_target) > 1e-15:
                ratio = self._dt_target / self._dt_current
                if ratio > self.DT_RAMP_PER_STEP:
                    self._dt_current *= self.DT_RAMP_PER_STEP
                elif ratio < 1.0 / self.DT_RAMP_PER_STEP:
                    self._dt_current /= self.DT_RAMP_PER_STEP
                else:
                    self._dt_current = self._dt_target
                try:
                    self.root_node.dt = self._dt_current
                except Exception as e:
                    print(f"[CTRController] failed to write dt: {e!r}")

            max_t = float(snap['translation_step_m'])
            max_r = float(snap['rotation_step_rad'])

            self._t2_tx = self._step_toward(self._t2_tx,
                                            float(snap['t2_tx_target_m']),  max_t)
            self._t2_ty = self._step_toward(self._t2_ty,
                                            float(snap['t2_ty_target_m']),  max_t)
            self._t2_tz = self._step_toward(self._t2_tz,
                                            float(snap['t2_tz_target_m']),  max_t)
            self._t2_rx = self._step_toward(self._t2_rx,
                                            float(snap['t2_rx_target_rad']), max_r)
            self._t2_rz = self._step_toward(self._t2_rz,
                                            float(snap['t2_rz_target_rad']), max_r)

            pose = self._compose_inner_pose()
            self._write_pose(self.t2_base_mo, pose)

        # 'waiting' / 'initializing': DO NOT write self.t2_base_mo.
        # The base floats, the rod curls symmetrically toward rest curvature.

    # ------------------------------------------------------------------
    def _compose_inner_pose(self):
        x_rest, y_rest, z_rest = self._t2_rest_pose[0:3]
        q_rest = tuple(self._t2_rest_pose[3:7])

        new_x = x_rest + self._t2_tx
        new_y = y_rest + self._t2_ty
        new_z = z_rest + self._t2_tz

        q_twist = self._quat_x(self._t2_rx)
        q_yaw   = self._quat_z(self._t2_rz)
        q_int   = self._quat_mul(q_rest, q_twist)
        q_out   = self._quat_mul(q_yaw,  q_int)
        q_out   = self._quat_normalize(q_out)

        return [new_x, new_y, new_z,
                q_out[0], q_out[1], q_out[2], q_out[3]]

    # ---- (unchanged: _write_pose, _step_toward, _quat_x/z/mul/normalize) --
    @staticmethod
    def _write_pose(mo, pose):
        with mo.position.writeable() as p:
            p[0] = list(pose)

    @staticmethod
    def _step_toward(current, target, max_step):
        delta = target - current
        if delta >  max_step: return current + max_step
        if delta < -max_step: return current - max_step
        return target

    @staticmethod
    def _quat_x(theta):
        h = 0.5 * theta
        return (math.sin(h), 0.0, 0.0, math.cos(h))

    @staticmethod
    def _quat_z(theta):
        h = 0.5 * theta
        return (0.0, 0.0, math.sin(h), math.cos(h))

    @staticmethod
    def _quat_mul(a, b):
        ax, ay, az, aw = a
        bx, by, bz, bw = b
        return (
            aw*bx + ax*bw + ay*bz - az*by,
            aw*by - ax*bz + ay*bw + az*bx,
            aw*bz + ax*by - ay*bx + az*bw,
            aw*bw - ax*bx - ay*by - az*bz,
        )

    @staticmethod
    def _quat_normalize(q):
        n2 = q[0]*q[0] + q[1]*q[1] + q[2]*q[2] + q[3]*q[3]
        if n2 < 1e-24:
            return (0.0, 0.0, 0.0, 1.0)
        inv = 1.0 / math.sqrt(n2)
        return (q[0]*inv, q[1]*inv, q[2]*inv, q[3]*inv)

# =============================================================================
#  CREATE SCENE
# =============================================================================

def createScene(root_node):

    # ---- Required plugins ---------------------------------------------------
    # Classic collision pipeline plugins (CollisionDetection.Algorithm,
    # CollisionDetection.Intersection, Collision.Response.Contact,
    # Collision.Geometry, Topology.Container.Dynamic, MultiThreading)
    # are removed -- they are fully replaced by the SSIM custom pipeline.
    root_node.addObject('RequiredPlugin', pluginName=[
        'Cosserat',                                           # DiscreteCosseratMapping, BeamHookeLawForceField,
                                                              # SphereSweptIntersectionMethod,
                                                              # BeamContactMapping, ContactFeeder
        'Sofa.Component.AnimationLoop',                       # FreeMotionAnimationLoop
        'Sofa.Component.Constraint.Lagrangian.Correction',   # UncoupledConstraintCorrection
        'Sofa.Component.Constraint.Lagrangian.Model',        # UnilateralLagrangianConstraint
        'Sofa.Component.Constraint.Lagrangian.Solver',       # BlockGaussSeidelConstraintSolver
        'Sofa.Component.Constraint.Projective',              # PartialFixedProjectiveConstraint
        'Sofa.Component.LinearSolver.Direct',                # SparseLDLSolver
        'Sofa.Component.Mapping.Linear',                     # IdentityMapping
        'Sofa.Component.Mapping.NonLinear',                  # RigidMapping
        'Sofa.Component.Mass',                               # UniformMass
        'Sofa.Component.ODESolver.Backward',                 # EulerImplicitSolver
        'Sofa.Component.Setting',                            # BackgroundSetting
        'Sofa.Component.SolidMechanics.Spring',              # RestShapeSpringsForceField
        'Sofa.Component.StateContainer',                     # MechanicalObject
        'Sofa.Component.Topology.Container.Constant',        # MeshTopology
        'Sofa.Component.Visual',                             # VisualStyle
        'Sofa.GL.Component.Rendering3D',                     # OglModel
        'Sofa.GUI.Component',                                # Camera
    ])

    root_node.gravity = [0., 0., 0.]
    root_node.dt      = 1e-3

    root_node.addObject('DefaultVisualManagerLoop')
    root_node.addObject('FreeMotionAnimationLoop')
    root_node.addObject('BackgroundSetting', color=[1.0, 1.0, 1.0, 0])

    # BlockGaussSeidelConstraintSolver must sit at root so its VecIds are
    # visible to all MechanicalObjects during FreeMotionAnimationLoop's
    # global visitors.
    root_node.addObject('BlockGaussSeidelConstraintSolver',
                        name='ConstraintSolver',
                        tolerance=1e-5,
                        maxIterations=500)

    root_node.addObject('Camera',
                        position=[0.5, -0.3, 0.3],
                        lookAt=[0.08, 0.0, 0.0])

    root_node.addObject('VisualStyle',
                        displayFlags='showVisualModels hideBehaviorModels '
                                     'hideCollisionModels '
                                     'hideBoundingCollisionModels '
                                     'hideForceFields '
                                     'hideInteractionForceFields '
                                     'hideWireframe '
                                     'hideMechanicalMappings')

    compute_length_of_outer_tube(T1_PARAMS, T2_PARAMS)
    compute_angle_arc(T1_PARAMS['length'],
                      T2_PARAMS['crv_radius'],
                      T2_PARAMS,
                      factor=1.5)

    # ---- Build tubes --------------------------------------------------------
    t1_base_mo, _, _, t1_frame_node, t1_solver, _ = add_cosserat_tube(
        root_node, T1_PARAMS, beam_type='straight',
        init_strategy='natural',
        fixed_directions=[1, 1, 1, 1, 1, 1],
    )
    t2_base_mo, _, _, t2_frame_node, t2_solver, t2_relax_spring_ff = add_cosserat_tube(
        root_node, T2_PARAMS, beam_type='arc',
        init_strategy='straight',
        outer_params=T1_PARAMS,
        fixed_directions=[1, 0, 1, 1, 1, 0],
        relaxation_spring_stiffness=RELAX_K_INITIAL_TRANS,
        relaxation_spring_angular  =RELAX_K_INITIAL_ANG,
    )
    # ---- Visual models ------------------------------------------------------

    add_tube_visual(t1_frame_node, T1_PARAMS, color=T1_PARAMS['color'])  # outer
    add_tube_visual(t2_frame_node, T2_PARAMS, color=T2_PARAMS['color'])  # inner

    # ---- GUI bridge ---------------------------------------------------------
    gui_bridge = CTRGuiBridgeStraightOuter(
        root_node=root_node,
        max_tx_m=0.04,  # tune for your scene
        max_ty_m=0.005,
        max_tz_m=0.005,
        max_rx_deg=180.0,
        max_rz_deg=15.0,
        init_dt=float(root_node.dt.value),
        default_control_dt=1e-3,
        dt_min=1e-6, dt_max=1e-1,
    )

    root_node.addObject(CTRController(
        name='CTRController',
        root_node=root_node,
        t1_base_mo=t1_base_mo,
        t2_base_mo=t2_base_mo,
        gui_bridge=gui_bridge,
    ))

    intersection_node = root_node.addChild('IntersectionNode')

    # ---- FramesMO handles ---------------------------------------------------
    t1_MO = t1_frame_node.FramesMO
    t2_MO = t2_frame_node.FramesMO


    ssim = intersection_node.addObject(
        'SphereSweptIntersectionMethod',
        name='ssim',
        beam1Frames=t1_MO.getLinkPath() + '.position',
        beam2Frames=t2_MO.getLinkPath() + '.position',
        beam1Velocities=t1_MO.getLinkPath() + '.velocity',
        beam2Velocities=t2_MO.getLinkPath() + '.velocity',
        radius1=T1_PARAMS['rex'],  # inner wall of Tube_1 [m]
        radius2=T2_PARAMS['rex'],
        innerRadius1=T1_PARAMS['rin'],
        innerRadius2=T2_PARAMS['rin'],
        algorithmType=ALGORITHM,
        contactConfiguration = "nested",
        defaultNormal = DEFAULT_NORMAL,
        broadPhaseMarginFactor = 1.5
    )

    contact_output = t1_frame_node.addChild('contactOutput')
    t2_frame_node.addChild(contact_output)

    contactMO = contact_output.addObject(
        'MechanicalObject', template='Vec3d',
        name='contactMO_gap',
        position=[[0., 0., 0.]] * 2 * MAX_K)

    bcm = contact_output.addObject(
        'BeamContactMapping',
        name='bcm',
        input1=t1_MO.getLinkPath(),
        input2=t2_MO.getLinkPath(),
        output=contactMO.getLinkPath(),
        ssim=ssim.getLinkPath(),
        mappingMode='contactPoints'
    )

    contact_output.addObject(
        'ContactPointsUnilateralConstraint',
        name='cpuc',
        mu=0,
        contactTriads=bcm.getLinkPath() + '.contactTriads',
        gapSign=bcm.getLinkPath() + '.gapSign',
    )

    t2_curv_abs_frames = list(
        t2_frame_node.cosseratMapping.curv_abs_output.value
    )

    # ---- Spring-based init: ramp K -> 0 in 'initializing' phase ------------
    # Number of frame DOFs in FramesMO = nb_frames + 1 (matches the spring
    # `points` list set in add_cosserat_tube). Driving stiffness from
    # K_INITIAL to zero replaces the velocity/quietness-based convergence
    # detection done previously by InitializationMonitor.
    nb_t2_frame_pts = T2_PARAMS['nb_frames'] + 1
    intersection_node.addObject(RelaxationSpringController(
        name='RelaxSpringCtrl',
        spring_ff=t2_relax_spring_ff,
        gui_bridge=gui_bridge,
        nb_points=nb_t2_frame_pts,
        K_initial=RELAX_K_INITIAL_TRANS,
        KA_initial=RELAX_K_INITIAL_ANG,
        ramp_steps=RELAX_RAMP_STEPS,
    ))

    intersection_node.addObject(LiveContactMonitor(
        name='LiveMonitor',
        t2_MO=t2_MO,
        bcm=bcm,
        contact_mo=contactMO,
        t2_frame_curv_abs=t2_curv_abs_frames,
        bridge=gui_bridge,
        every_n_steps=20,
    ))
    # -------------------------------------------------------------------------

    root_node.animate = False

    return root_node
